// SBML level 3 version 1

model biosign_dna_model()
  // model units - substance: nano_mole_per_litre, volume: volume

  // Sub-modules:
  promLacIC1_model: promLacI_model();
  rbs1C2_model_promLacIC1: rbs1_model();
  cdsAC3_model_promLacIC1: cdsA_model();
  prom2C5_model: prom2_model();
  rbsLacIC6_model_prom2C5: rbsLacI_model();
  cdsLacIC7_model_prom2C5: cdsLacI_model();
  promAraAraCC9_model: promAraAraC_model();
  rbsBC10_model_promAraAraCC9: rbsB_model();
  cdsBC11_model_promAraAraCC9: cdsB_model();
  promAraCC13_model: promAraC_model();
  rbsAraCC14_model_promAraCC13: rbsAraC_model();
  cdsAraCC15_model_promAraCC13: cdsAraC_model();
  promCC17_model: promC_model();
  rbsCC18_model_promCC17: rbsC_model();
  cdsCC19_model_promCC17: cdsC_model();
  promZC21_model: promZ_model();
  rbsZC22_model_promZC21: rbsZ_model();
  cdsZC23_model_promZC21: cdsZ_model();
  promDC25_model: promD_model();
  rbsDC26_model_promDC25: rbsD_model();
  cdsDC27_model_promDC25: cdsD_model();
  LacI_represses_promLacI_promLacIC1_model: LacI_represses_promLacI_model();
  A_activates_promC_promCC17_model: A_activates_promC_model();
  AraC_Ara_activates_promAraAraC_promAraAraCC9_model: AraC_Ara_activates_promAraAraC_model();
  LacI_IPTG_degradation_model: degradation_template();
  IPTG_bindsto_LacI_model: IPTG_bindsto_LacI_model();
  CD_degradation_model: degradation_template();
  C_bindsto_D_model: C_bindsto_D_model();
  C_activates_promD_promDC25_model: C_activates_promD_model();
  AraC_Ara_degradation_model: degradation_template();
  Ara_bindsto_AraC_model: Ara_bindsto_AraC_model();
  CD_activates_promZ_promZC21_model: CD_activates_promZ_model();
  AB_degradation_model: degradation_template();
  A_bindsto_B_model: A_bindsto_B_model();

  // Compartments:
  compartment cell = 1e-15 litre; promLacIC1_model.cell is cell; rbs1C2_model_promLacIC1.cell is cell; cdsAC3_model_promLacIC1.cell is cell; prom2C5_model.cell is cell; rbsLacIC6_model_prom2C5.cell is cell; cdsLacIC7_model_prom2C5.cell is cell; promAraAraCC9_model.cell is cell; rbsBC10_model_promAraAraCC9.cell is cell; cdsBC11_model_promAraAraCC9.cell is cell; promAraCC13_model.cell is cell; rbsAraCC14_model_promAraCC13.cell is cell; cdsAraCC15_model_promAraCC13.cell is cell; promCC17_model.cell is cell; rbsCC18_model_promCC17.cell is cell; cdsCC19_model_promCC17.cell is cell; promZC21_model.cell is cell; rbsZC22_model_promZC21.cell is cell; cdsZC23_model_promZC21.cell is cell; promDC25_model.cell is cell; rbsDC26_model_promDC25.cell is cell; cdsDC27_model_promDC25.cell is cell; LacI_represses_promLacI_promLacIC1_model.cell is cell; A_activates_promC_promCC17_model.cell is cell; AraC_Ara_activates_promAraAraC_promAraAraCC9_model.cell is cell; LacI_IPTG_degradation_model.cell is cell; IPTG_bindsto_LacI_model.cell is cell; CD_degradation_model.cell is cell; C_bindsto_D_model.cell is cell; C_activates_promD_promDC25_model.cell is cell; AraC_Ara_degradation_model.cell is cell; Ara_bindsto_AraC_model.cell is cell; CD_activates_promZ_promZC21_model.cell is cell; AB_degradation_model.cell is cell; A_bindsto_B_model.cell is cell;

  // Species:
  species SigmaA in cell = 1000; promLacIC1_model.SigmaA is SigmaA; prom2C5_model.SigmaA is SigmaA; promAraAraCC9_model.SigmaA is SigmaA; promAraCC13_model.SigmaA is SigmaA; promCC17_model.SigmaA is SigmaA; promZC21_model.SigmaA is SigmaA; promDC25_model.SigmaA is SigmaA; A_activates_promC_promCC17_model.sigmaFactor is SigmaA; AraC_Ara_activates_promAraAraC_promAraAraCC9_model.sigmaFactor is SigmaA; C_activates_promD_promDC25_model.sigmaFactor is SigmaA; CD_activates_promZ_promZC21_model.sigmaFactor is SigmaA;
  species mrnapromLacIC1 in cell = 0; promLacIC1_model.mRNA is mrnapromLacIC1; rbs1C2_model_promLacIC1.mRNA is mrnapromLacIC1; LacI_represses_promLacI_promLacIC1_model.mRNA is mrnapromLacIC1;
  species promLacIC1 in cell = 1; promLacIC1_model.promLacI is promLacIC1; LacI_represses_promLacI_promLacIC1_model.promoter is promLacIC1;
  species rbs1C2 in cell = 1; rbs1C2_model_promLacIC1.rbs is rbs1C2;
  species cdsAC3 in cell = 1; cdsAC3_model_promLacIC1.cds is cdsAC3;
  species mrnaprom2C5 in cell = 0; prom2C5_model.mRNA is mrnaprom2C5; rbsLacIC6_model_prom2C5.mRNA is mrnaprom2C5;
  species prom2C5 in cell = 1; prom2C5_model.prom2 is prom2C5;
  species rbsLacIC6 in cell = 1; rbsLacIC6_model_prom2C5.rbs is rbsLacIC6;
  species cdsLacIC7 in cell = 1; cdsLacIC7_model_prom2C5.cds is cdsLacIC7;
  species mrnapromAraAraCC9 in cell = 0; promAraAraCC9_model.mRNA is mrnapromAraAraCC9; rbsBC10_model_promAraAraCC9.mRNA is mrnapromAraAraCC9; AraC_Ara_activates_promAraAraC_promAraAraCC9_model.mRNA is mrnapromAraAraCC9;
  species promAraAraCC9 in cell = 1; promAraAraCC9_model.promAraAraC is promAraAraCC9; AraC_Ara_activates_promAraAraC_promAraAraCC9_model.promoter is promAraAraCC9;
  species rbsBC10 in cell = 1; rbsBC10_model_promAraAraCC9.rbs is rbsBC10;
  species cdsBC11 in cell = 1; cdsBC11_model_promAraAraCC9.cds is cdsBC11;
  species mrnapromAraCC13 in cell = 0; promAraCC13_model.mRNA is mrnapromAraCC13; rbsAraCC14_model_promAraCC13.mRNA is mrnapromAraCC13;
  species promAraCC13 in cell = 1; promAraCC13_model.promAraC is promAraCC13;
  species rbsAraCC14 in cell = 1; rbsAraCC14_model_promAraCC13.rbs is rbsAraCC14;
  species cdsAraCC15 in cell = 1; cdsAraCC15_model_promAraCC13.cds is cdsAraCC15;
  species mrnapromCC17 in cell = 0; promCC17_model.mRNA is mrnapromCC17; rbsCC18_model_promCC17.mRNA is mrnapromCC17; A_activates_promC_promCC17_model.mRNA is mrnapromCC17;
  species promCC17 in cell = 1; promCC17_model.promC is promCC17; A_activates_promC_promCC17_model.promoter is promCC17;
  species rbsCC18 in cell = 1; rbsCC18_model_promCC17.rbs is rbsCC18;
  species cdsCC19 in cell = 1; cdsCC19_model_promCC17.cds is cdsCC19;
  species mrnapromZC21 in cell = 0; promZC21_model.mRNA is mrnapromZC21; rbsZC22_model_promZC21.mRNA is mrnapromZC21; CD_activates_promZ_promZC21_model.mRNA is mrnapromZC21;
  species promZC21 in cell = 1; promZC21_model.promZ is promZC21; CD_activates_promZ_promZC21_model.promoter is promZC21;
  species rbsZC22 in cell = 1; rbsZC22_model_promZC21.rbs is rbsZC22;
  species cdsZC23 in cell = 1; cdsZC23_model_promZC21.cds is cdsZC23;
  species mrnapromDC25 in cell = 0; promDC25_model.mRNA is mrnapromDC25; rbsDC26_model_promDC25.mRNA is mrnapromDC25; C_activates_promD_promDC25_model.mRNA is mrnapromDC25;
  species promDC25 in cell = 1; promDC25_model.promD is promDC25; C_activates_promD_promDC25_model.promoter is promDC25;
  species rbsDC26 in cell = 1; rbsDC26_model_promDC25.rbs is rbsDC26;
  species cdsDC27 in cell = 1; cdsDC27_model_promDC25.cds is cdsDC27;
  species LacI in cell = 500; LacI_represses_promLacI_promLacIC1_model.inhibitor is LacI; cdsLacIC7_model_prom2C5.protein is LacI; IPTG_bindsto_LacI_model.reactant is LacI;
  species AraC in cell = 0; cdsAraCC15_model_promAraCC13.protein is AraC; Ara_bindsto_AraC_model.reactant is AraC;
  species A in cell = 0; A_activates_promC_promCC17_model.activator is A; cdsAC3_model_promLacIC1.protein is A; A_bindsto_B_model.species1 is A;
  species D in cell = 0; cdsDC27_model_promDC25.protein is D; C_bindsto_D_model.species2 is D;
  species AraC_Ara in cell = 0; AraC_Ara_activates_promAraAraC_promAraAraCC9_model.activator is AraC_Ara; AraC_Ara_degradation_model.species is AraC_Ara; Ara_bindsto_AraC_model.complex is AraC_Ara;
  species Z in cell = 0; cdsZC23_model_promZC21.protein is Z;
  species LacI_IPTG in cell = 0; LacI_IPTG_degradation_model.species is LacI_IPTG; IPTG_bindsto_LacI_model.complex is LacI_IPTG;
  species IPTG in cell = 0; IPTG_bindsto_LacI_model.modifier is IPTG;
  species CD in cell = 0; CD_degradation_model.species is CD; C_bindsto_D_model.complex is CD; CD_activates_promZ_promZC21_model.activator is CD;
  species C in cell = 0; C_bindsto_D_model.species1 is C; C_activates_promD_promDC25_model.activator is C; cdsCC19_model_promCC17.protein is C;
  species B in cell = 0; cdsBC11_model_promAraAraCC9.protein is B; A_bindsto_B_model.species2 is B;
  species Ara in cell = 0; Ara_bindsto_AraC_model.modifier is Ara;
  species AB in cell = 0; AB_degradation_model.species is AB; A_bindsto_B_model.complex is AB;

  // Parameters:
  ripsrbs1C2_mrnapromLacIC1 = ; rbs1C2_model_promLacIC1.rips is ripsrbs1C2_mrnapromLacIC1; cdsAC3_model_promLacIC1.rips is ripsrbs1C2_mrnapromLacIC1;
  ripsrbsLacIC6_mrnaprom2C5 = ; rbsLacIC6_model_prom2C5.rips is ripsrbsLacIC6_mrnaprom2C5; cdsLacIC7_model_prom2C5.rips is ripsrbsLacIC6_mrnaprom2C5;
  ripsrbsBC10_mrnapromAraAraCC9 = ; rbsBC10_model_promAraAraCC9.rips is ripsrbsBC10_mrnapromAraAraCC9; cdsBC11_model_promAraAraCC9.rips is ripsrbsBC10_mrnapromAraAraCC9;
  ripsrbsAraCC14_mrnapromAraCC13 = ; rbsAraCC14_model_promAraCC13.rips is ripsrbsAraCC14_mrnapromAraCC13; cdsAraCC15_model_promAraCC13.rips is ripsrbsAraCC14_mrnapromAraCC13;
  ripsrbsCC18_mrnapromCC17 = ; rbsCC18_model_promCC17.rips is ripsrbsCC18_mrnapromCC17; cdsCC19_model_promCC17.rips is ripsrbsCC18_mrnapromCC17;
  ripsrbsZC22_mrnapromZC21 = ; rbsZC22_model_promZC21.rips is ripsrbsZC22_mrnapromZC21; cdsZC23_model_promZC21.rips is ripsrbsZC22_mrnapromZC21;
  ripsrbsDC26_mrnapromDC25 = ; rbsDC26_model_promDC25.rips is ripsrbsDC26_mrnapromDC25; cdsDC27_model_promDC25.rips is ripsrbsDC26_mrnapromDC25;

  // Assignment rules:
  promLacIC1pFreeCisEntities := rbs1C2/1*(cdsAC3/1);
  prom2C5pFreeCisEntities := rbsLacIC6/1*(cdsLacIC7/1);
  promAraAraCC9pFreeCisEntities := rbsBC10/1*(cdsBC11/1);
  promAraCC13pFreeCisEntities := rbsAraCC14/1*(cdsAraCC15/1);
  promCC17pFreeCisEntities := rbsCC18/1*(cdsCC19/1);
  promZC21pFreeCisEntities := rbsZC22/1*(cdsZC23/1);
  promDC25pFreeCisEntities := rbsDC26/1*(cdsDC27/1);
  Atotal_param := A + AB;
  Btotal_param := B + AB;

  // Events:
  IPTG_setEvent: at (time == 1000), persistent=false: IPTG = 1000;
  IPTG_unsetEvent: at (time == 1500), persistent=false: IPTG = 0;
  Arabinose_setevent: at (time == 1300), persistent=false: Ara = 1000;
  Arabinose_unsetevent: at (time == 1800), persistent=false: Ara = 0;

  // Unit definitions:
  unit nano_mole_per_litre = 1e-9 mole;
  unit volume = 1e-15 litre;
  unit per_second = 1 / second;
end

model promLacI_model(SigmaA, ktr, cell, mRNA, promLacI, pFreeCisEntities)
  // model units - substance: nano_mole_per_litre, volume: volume

  // Sub-modules:
  pt: promoter_template();

  // Compartments:
  compartment cell = 1e-15 litre; pt.cell is cell;

  // Species:
  species mRNA in cell = 0; pt.mRNA is mRNA;
  species promLacI in cell = 1; pt.promoter is promLacI;
  species SigmaA in cell = 1000; pt.sigmaFactor is SigmaA;

  // Parameters:
  ktr = 0.1; pt.ktr is ktr;
  pFreeCisEntities = 1; pt.pFreeCisEntities is pFreeCisEntities;

  // Unit definitions:
  unit nano_mole_per_litre = 1e-9 mole;
  unit volume = 1e-15 litre;
  unit per_second = 1 / second;
end

model promoter_template(sigmaFactor, ktr, cell, mRNA, kdeg, promoter, pFreeCisEntities)
  // model units - substance: nano_mole_per_litre, volume: volume

  // Sub-modules:
  transcription: transcription_template();
  mrna_degradation: degradation_template();

  // Compartments:
  compartment cell = 1e-15 litre; transcription.cell is cell; mrna_degradation.cell is cell;

  // Species:
  species promoter in cell = 1.6611; transcription.popsSpecies is promoter;
  species mRNA in cell = 0; transcription.mRNA is mRNA; mrna_degradation.species is mRNA;
  species sigmaFactor in cell = 1000; transcription.sigmaFactor is sigmaFactor;

  // Parameters:
  ktr = 0.1; transcription.ktr is ktr;
  kdeg = 0.0058; mrna_degradation.kdeg is kdeg;
  pFreeCisEntities = 1; transcription.pFreeCisEntities is pFreeCisEntities;

  // Unit definitions:
  unit nano_mole_per_litre = 1e-9 mole;
  unit volume = 1e-15 litre;
  unit per_second = 1 / second;
end

model transcription_template(sigmaFactor, ktr, cell, mRNA, popsSpecies, pFreeCisEntities)
  // model units - substance: nano_mole_per_litre, volume: volume

  // Compartments:
  compartment cell = 1e-15 litre;

  // Species:
  species popsSpecies in cell = 1.6611;
  species mRNA in cell = 0;
  species sigmaFactor in cell = 1000;

  // Parameters:
  kmSF = 50;
  ktr = 0.1;
  pFreeCisEntities = 1;

  // Reactions:
  transcription: popsSpecies => popsSpecies + mRNA; cell*popsSpecies*ktr*(sigmaFactor/(sigmaFactor + kmSF))*pFreeCisEntities;  // modifiers: sigmaFactor

  // Unit definitions:
  unit nano_mole_per_litre = 1e-9 mole;
  unit volume = 1e-15 litre;
  unit per_second = 1 / second;
end

model degradation_template(species, cell, kdeg)
  // model units - substance: nano_mole_per_litre, volume: volume

  // Compartments:
  compartment cell = 1e-15 litre;

  // Species:
  species species in cell = 0;

  // Parameters:
  kdeg = 0.0012;

  // Reactions:
  degradation: species => ; cell*species*kdeg;

  // Unit definitions:
  unit nano_mole_per_litre = 1e-9 mole;
  unit volume = 1e-15 litre;
  unit per_second = 1 / second;
end

model rbs1_model(rips, cell, mRNA, ktl, rbs)
  // model units - substance: nano_mole_per_litre, volume: volume

  // Sub-modules:
  rt: rbs_template();

  // Compartments:
  compartment cell = 1e-15 litre; rt.cell is cell;

  // Species:
  species mRNA in cell = 0; rt.mRNA is mRNA;
  species rbs in cell = 1; rt.rbs is rbs;

  // Parameters:
  ktl = 0.1; rt.ktl is ktl;
  rips = ; rt.rips is rips;

  // Unit definitions:
  unit nano_mole_per_litre = 1e-9 mole;
  unit volume = 1e-15 litre;
  unit per_second = 1 / second;
end

model rbs_template(rips, cell, ktl, mRNA, rbs)
  // model units - substance: nano_mole_per_litre, volume: volume

  // Compartments:
  compartment cell = 1e-15 litre;

  // Species:
  species mRNA in cell = 0;
  species rbs in cell = 1;

  // Parameters:
  ktl = 0.1;

  // Assignment rules:
  rips := ktl*rbs*mRNA;

  // Unit definitions:
  unit nano_mole_per_litre = 1e-9 mole;
  unit volume = 1e-15 litre;
  unit per_second = 1 / second;
end

model cdsA_model(protein, rips, cell, cds)
  // model units - substance: nano_mole_per_litre, volume: volume

  // Sub-modules:
  ct: cds_template();

  // Compartments:
  compartment cell = 1e-15 litre; ct.cell is cell;

  // Species:
  species protein in cell = 0; ct.protein is protein;
  species cds in cell = 1;

  // Parameters:
  rips = ; ct.rips is rips;

  // Unit definitions:
  unit nano_mole_per_litre = 1e-9 mole;
  unit volume = 1e-15 litre;
  unit per_second = 1 / second;
end

model cds_template(protein, rips, cell, kdeg)
  // model units - substance: nano_mole_per_litre, volume: volume

  // Sub-modules:
  cdsproduct_degradation: degradation_template();

  // Compartments:
  compartment cell = 1e-15 litre; cdsproduct_degradation.cell is cell;

  // Species:
  species protein in cell = 0; cdsproduct_degradation.species is protein;

  // Parameters:
  rips = ;
  kdeg = 0.0012; cdsproduct_degradation.kdeg is kdeg;

  // Reactions:
  translation: => protein; cell*rips;

  // Unit definitions:
  unit nano_mole_per_litre = 1e-9 mole;
  unit volume = 1e-15 litre;
  unit per_second = 1 / second;
end

model prom2_model(SigmaA, ktr, cell, mRNA, prom2, pFreeCisEntities)
  // model units - substance: nano_mole_per_litre, volume: volume

  // Sub-modules:
  pt: promoter_template();

  // Compartments:
  compartment cell = 1e-15 litre; pt.cell is cell;

  // Species:
  species mRNA in cell = 0; pt.mRNA is mRNA;
  species prom2 in cell = 1; pt.promoter is prom2;
  species SigmaA in cell = 1000; pt.sigmaFactor is SigmaA;

  // Parameters:
  ktr = 0.1; pt.ktr is ktr;
  pFreeCisEntities = 1; pt.pFreeCisEntities is pFreeCisEntities;

  // Unit definitions:
  unit nano_mole_per_litre = 1e-9 mole;
  unit volume = 1e-15 litre;
  unit per_second = 1 / second;
end

model rbsLacI_model(rips, cell, mRNA, ktl, rbs)
  // model units - substance: nano_mole_per_litre, volume: volume

  // Sub-modules:
  rt: rbs_template();

  // Compartments:
  compartment cell = 1e-15 litre; rt.cell is cell;

  // Species:
  species mRNA in cell = 0; rt.mRNA is mRNA;
  species rbs in cell = 1; rt.rbs is rbs;

  // Parameters:
  ktl = 0.1; rt.ktl is ktl;
  rips = ; rt.rips is rips;

  // Unit definitions:
  unit nano_mole_per_litre = 1e-9 mole;
  unit volume = 1e-15 litre;
  unit per_second = 1 / second;
end

model cdsLacI_model(protein, rips, cell, cds)
  // model units - substance: nano_mole_per_litre, volume: volume

  // Sub-modules:
  ct: cds_template();

  // Compartments:
  compartment cell = 1e-15 litre; ct.cell is cell;

  // Species:
  species protein in cell = 0; ct.protein is protein;
  species cds in cell = 1;

  // Parameters:
  rips = ; ct.rips is rips;

  // Unit definitions:
  unit nano_mole_per_litre = 1e-9 mole;
  unit volume = 1e-15 litre;
  unit per_second = 1 / second;
end

model promAraAraC_model(SigmaA, ktr, cell, mRNA, promAraAraC, pFreeCisEntities)
  // model units - substance: nano_mole_per_litre, volume: volume

  // Sub-modules:
  pt: promoter_template();

  // Compartments:
  compartment cell = 1e-15 litre; pt.cell is cell;

  // Species:
  species mRNA in cell = 0; pt.mRNA is mRNA;
  species promAraAraC in cell = 1; pt.promoter is promAraAraC;
  species SigmaA in cell = 1000; pt.sigmaFactor is SigmaA;

  // Parameters:
  ktr = 0.0001; pt.ktr is ktr;
  pFreeCisEntities = 1; pt.pFreeCisEntities is pFreeCisEntities;

  // Unit definitions:
  unit nano_mole_per_litre = 1e-9 mole;
  unit volume = 1e-15 litre;
  unit per_second = 1 / second;
end

model rbsB_model(rips, cell, mRNA, ktl, rbs)
  // model units - substance: nano_mole_per_litre, volume: volume

  // Sub-modules:
  rt: rbs_template();

  // Compartments:
  compartment cell = 1e-15 litre; rt.cell is cell;

  // Species:
  species mRNA in cell = 0; rt.mRNA is mRNA;
  species rbs in cell = 1; rt.rbs is rbs;

  // Parameters:
  ktl = 0.1; rt.ktl is ktl;
  rips = ; rt.rips is rips;

  // Unit definitions:
  unit nano_mole_per_litre = 1e-9 mole;
  unit volume = 1e-15 litre;
  unit per_second = 1 / second;
end

model cdsB_model(protein, rips, cell, cds)
  // model units - substance: nano_mole_per_litre, volume: volume

  // Sub-modules:
  ct: cds_template();

  // Compartments:
  compartment cell = 1e-15 litre; ct.cell is cell;

  // Species:
  species protein in cell = 0; ct.protein is protein;
  species cds in cell = 1;

  // Parameters:
  rips = ; ct.rips is rips;

  // Unit definitions:
  unit nano_mole_per_litre = 1e-9 mole;
  unit volume = 1e-15 litre;
  unit per_second = 1 / second;
end

model promAraC_model(SigmaA, ktr, cell, mRNA, promAraC, pFreeCisEntities)
  // model units - substance: nano_mole_per_litre, volume: volume

  // Sub-modules:
  pt: promoter_template();

  // Compartments:
  compartment cell = 1e-15 litre; pt.cell is cell;

  // Species:
  species mRNA in cell = 0; pt.mRNA is mRNA;
  species promAraC in cell = 1; pt.promoter is promAraC;
  species SigmaA in cell = 1000; pt.sigmaFactor is SigmaA;

  // Parameters:
  ktr = 0.1; pt.ktr is ktr;
  pFreeCisEntities = 1; pt.pFreeCisEntities is pFreeCisEntities;

  // Unit definitions:
  unit nano_mole_per_litre = 1e-9 mole;
  unit volume = 1e-15 litre;
  unit per_second = 1 / second;
end

model rbsAraC_model(rips, cell, mRNA, ktl, rbs)
  // model units - substance: nano_mole_per_litre, volume: volume

  // Sub-modules:
  rt: rbs_template();

  // Compartments:
  compartment cell = 1e-15 litre; rt.cell is cell;

  // Species:
  species mRNA in cell = 0; rt.mRNA is mRNA;
  species rbs in cell = 1; rt.rbs is rbs;

  // Parameters:
  ktl = 0.1; rt.ktl is ktl;
  rips = ; rt.rips is rips;

  // Unit definitions:
  unit nano_mole_per_litre = 1e-9 mole;
  unit volume = 1e-15 litre;
  unit per_second = 1 / second;
end

model cdsAraC_model(protein, rips, cell, cds)
  // model units - substance: nano_mole_per_litre, volume: volume

  // Sub-modules:
  ct: cds_template();

  // Compartments:
  compartment cell = 1e-15 litre; ct.cell is cell;

  // Species:
  species protein in cell = 0; ct.protein is protein;
  species cds in cell = 1;

  // Parameters:
  rips = ; ct.rips is rips;

  // Unit definitions:
  unit nano_mole_per_litre = 1e-9 mole;
  unit volume = 1e-15 litre;
  unit per_second = 1 / second;
end

model promC_model(SigmaA, ktr, cell, mRNA, promC, pFreeCisEntities)
  // model units - substance: nano_mole_per_litre, volume: volume

  // Sub-modules:
  pt: promoter_template();

  // Compartments:
  compartment cell = 1e-15 litre; pt.cell is cell;

  // Species:
  species mRNA in cell = 0; pt.mRNA is mRNA;
  species promC in cell = 1; pt.promoter is promC;
  species SigmaA in cell = 1000; pt.sigmaFactor is SigmaA;

  // Parameters:
  ktr = 0.0001; pt.ktr is ktr;
  pFreeCisEntities = 1; pt.pFreeCisEntities is pFreeCisEntities;

  // Unit definitions:
  unit nano_mole_per_litre = 1e-9 mole;
  unit volume = 1e-15 litre;
  unit per_second = 1 / second;
end

model rbsC_model(rips, cell, mRNA, ktl, rbs)
  // model units - substance: nano_mole_per_litre, volume: volume

  // Sub-modules:
  rt: rbs_template();

  // Compartments:
  compartment cell = 1e-15 litre; rt.cell is cell;

  // Species:
  species mRNA in cell = 0; rt.mRNA is mRNA;
  species rbs in cell = 1; rt.rbs is rbs;

  // Parameters:
  ktl = 0.1; rt.ktl is ktl;
  rips = ; rt.rips is rips;

  // Unit definitions:
  unit nano_mole_per_litre = 1e-9 mole;
  unit volume = 1e-15 litre;
  unit per_second = 1 / second;
end

model cdsC_model(protein, rips, cell, cds)
  // model units - substance: nano_mole_per_litre, volume: volume

  // Sub-modules:
  ct: cds_template();

  // Compartments:
  compartment cell = 1e-15 litre; ct.cell is cell;

  // Species:
  species protein in cell = 0; ct.protein is protein;
  species cds in cell = 1;

  // Parameters:
  rips = ; ct.rips is rips;

  // Unit definitions:
  unit nano_mole_per_litre = 1e-9 mole;
  unit volume = 1e-15 litre;
  unit per_second = 1 / second;
end

model promZ_model(SigmaA, ktr, cell, mRNA, promZ, pFreeCisEntities)
  // model units - substance: nano_mole_per_litre, volume: volume

  // Sub-modules:
  pt: promoter_template();

  // Compartments:
  compartment cell = 1e-15 litre; pt.cell is cell;

  // Species:
  species mRNA in cell = 0; pt.mRNA is mRNA;
  species promZ in cell = 1; pt.promoter is promZ;
  species SigmaA in cell = 1000; pt.sigmaFactor is SigmaA;

  // Parameters:
  ktr = 0.0001; pt.ktr is ktr;
  pFreeCisEntities = 1; pt.pFreeCisEntities is pFreeCisEntities;

  // Unit definitions:
  unit nano_mole_per_litre = 1e-9 mole;
  unit volume = 1e-15 litre;
  unit per_second = 1 / second;
end

model rbsZ_model(rips, cell, mRNA, ktl, rbs)
  // model units - substance: nano_mole_per_litre, volume: volume

  // Sub-modules:
  rt: rbs_template();

  // Compartments:
  compartment cell = 1e-15 litre; rt.cell is cell;

  // Species:
  species mRNA in cell = 0; rt.mRNA is mRNA;
  species rbs in cell = 1; rt.rbs is rbs;

  // Parameters:
  ktl = 0.1; rt.ktl is ktl;
  rips = ; rt.rips is rips;

  // Unit definitions:
  unit nano_mole_per_litre = 1e-9 mole;
  unit volume = 1e-15 litre;
  unit per_second = 1 / second;
end

model cdsZ_model(protein, rips, cell, kdeg, cds)
  // model units - substance: nano_mole_per_litre, volume: volume

  // Sub-modules:
  ct: cds_template();

  // Compartments:
  compartment cell = 1e-15 litre; ct.cell is cell;

  // Species:
  species protein in cell = 0; ct.protein is protein;
  species cds in cell = 1;

  // Parameters:
  rips = ; ct.rips is rips;
  kdeg = 0.001; ct.kdeg is kdeg;

  // Unit definitions:
  unit nano_mole_per_litre = 1e-9 mole;
  unit volume = 1e-15 litre;
  unit per_second = 1 / second;
end

model promD_model(SigmaA, ktr, cell, mRNA, promD, pFreeCisEntities)
  // model units - substance: nano_mole_per_litre, volume: volume

  // Sub-modules:
  pt: promoter_template();

  // Compartments:
  compartment cell = 1e-15 litre; pt.cell is cell;

  // Species:
  species mRNA in cell = 0; pt.mRNA is mRNA;
  species promD in cell = 1; pt.promoter is promD;
  species SigmaA in cell = 1000; pt.sigmaFactor is SigmaA;

  // Parameters:
  ktr = 0.0001; pt.ktr is ktr;
  pFreeCisEntities = 1; pt.pFreeCisEntities is pFreeCisEntities;

  // Unit definitions:
  unit nano_mole_per_litre = 1e-9 mole;
  unit volume = 1e-15 litre;
  unit per_second = 1 / second;
end

model rbsD_model(rips, cell, mRNA, ktl, rbs)
  // model units - substance: nano_mole_per_litre, volume: volume

  // Sub-modules:
  rt: rbs_template();

  // Compartments:
  compartment cell = 1e-15 litre; rt.cell is cell;

  // Species:
  species mRNA in cell = 0; rt.mRNA is mRNA;
  species rbs in cell = 1; rt.rbs is rbs;

  // Parameters:
  ktl = 0.1; rt.ktl is ktl;
  rips = ; rt.rips is rips;

  // Unit definitions:
  unit nano_mole_per_litre = 1e-9 mole;
  unit volume = 1e-15 litre;
  unit per_second = 1 / second;
end

model cdsD_model(protein, rips, cell, cds)
  // model units - substance: nano_mole_per_litre, volume: volume

  // Sub-modules:
  ct: cds_template();

  // Compartments:
  compartment cell = 1e-15 litre; ct.cell is cell;

  // Species:
  species protein in cell = 0; ct.protein is protein;
  species cds in cell = 1;

  // Parameters:
  rips = ; ct.rips is rips;

  // Unit definitions:
  unit nano_mole_per_litre = 1e-9 mole;
  unit volume = 1e-15 litre;
  unit per_second = 1 / second;
end

model LacI_represses_promLacI_model(kb, inhibitor, cell, kf, mRNA, promoter)
  // model units - substance: nano_mole_per_litre, volume: volume

  // Sub-modules:
  prt: promoterrepression_template();

  // Compartments:
  compartment cell = 1e-15 litre; prt.cell is cell;

  // Species:
  species mRNA in cell = 0; prt.mRNA is mRNA;
  species inhibitor in cell = 0; prt.activator is inhibitor;
  species promoter in cell = 0; prt.promoter is promoter;

  // Parameters:
  kf = 0.1; prt.kf is kf;
  kb = 0.5; prt.kb is kb;

  // Unit definitions:
  unit nano_mole_per_litre = 1e-9 mole;
  unit volume = 1e-15 litre;
  unit per_second = 1 / second;
end

model promoterrepression_template(kb, activator, cell, kf, mRNA, promoter)
  // model units - substance: nano_mole_per_litre, volume: volume

  // Sub-modules:
  binding: binding_template();

  // Compartments:
  compartment cell = 1e-15 litre; binding.cell is cell;

  // Species:
  species promoter in cell = 1.6611; binding.species1 is promoter;
  species activator in cell = 0; binding.species2 is activator;
  species promoterRepressor in cell = 0; binding.complex is promoterRepressor;
  species mRNA in cell = 0;

  // Parameters:
  kf = 0.001; binding.kf is kf;
  kb = 0.5; binding.kb is kb;

  // Unit definitions:
  unit nano_mole_per_litre = 1e-9 mole;
  unit volume = 1e-15 litre;
  unit per_second = 1 / second;
end

model binding_template(species1, complex, kb, cell, kf, species2)
  // model units - substance: nano_mole_per_litre, volume: volume

  // Compartments:
  compartment cell = 1e-15 litre;

  // Species:
  species species1 in cell = 1.6611;
  species species2 in cell = 0;
  species complex in cell = 0;

  // Parameters:
  kf = 0.001;
  kb = 0.5;

  // Reactions:
  binding: species1 + species2 => complex; cell*species1*species2*kf;
  unbinding: complex => species1 + species2; cell*complex*kb;

  // Unit definitions:
  unit nano_mole_per_litre = 1e-9 mole;
  unit volume = 1e-15 litre;
  unit per_second = 1 / second;
end

model A_activates_promC_model(sigmaFactor, kb, ktr, cell, kf, mRNA, activator, promoter, pFreeCisEntities)
  // model units - substance: nano_mole_per_litre, volume: volume

  // Sub-modules:
  pit: promoterinduction_template();

  // Compartments:
  compartment cell = 1e-15 litre; pit.cell is cell;

  // Species:
  species mRNA in cell = 0; pit.mRNA is mRNA;
  species activator in cell = 0; pit.activator is activator;
  species promoter in cell = 0; pit.promoter is promoter;
  species sigmaFactor in cell = 1000; pit.sigmaFactor is sigmaFactor;

  // Parameters:
  ktr = 0.1; pit.ktr is ktr;
  pFreeCisEntities = 1; pit.pFreeCisEntities is pFreeCisEntities;
  kf = 0.001; pit.kf is kf;
  kb = 0.5; pit.kb is kb;

  // Unit definitions:
  unit nano_mole_per_litre = 1e-9 mole;
  unit volume = 1e-15 litre;
  unit per_second = 1 / second;
end

model promoterinduction_template(sigmaFactor, kb, ktr, cell, kf, mRNA, activator, promoter, pFreeCisEntities)
  // model units - substance: nano_mole_per_litre, volume: volume

  // Sub-modules:
  binding: binding_template();
  activated: transcription_template();

  // Compartments:
  compartment cell = 1e-15 litre; binding.cell is cell; activated.cell is cell;

  // Species:
  species promoter in cell = 1.6611; binding.species1 is promoter;
  species activator in cell = 0; binding.species2 is activator;
  species promoterActivator in cell = 0; binding.complex is promoterActivator; activated.popsSpecies is promoterActivator;
  species sigmaFactor in cell = 1000; activated.sigmaFactor is sigmaFactor;
  species mRNA in cell = 0; activated.mRNA is mRNA;

  // Parameters:
  ktr = 0.1; activated.ktr is ktr;
  kf = 0.001; binding.kf is kf;
  kb = 0.5; binding.kb is kb;
  pFreeCisEntities = 1; activated.pFreeCisEntities is pFreeCisEntities;

  // Unit definitions:
  unit nano_mole_per_litre = 1e-9 mole;
  unit volume = 1e-15 litre;
  unit per_second = 1 / second;
end

model AraC_Ara_activates_promAraAraC_model(sigmaFactor, kb, ktr, cell, kf, mRNA, activator, promoter, pFreeCisEntities)
  // model units - substance: nano_mole_per_litre, volume: volume

  // Sub-modules:
  pit: promoterinduction_template();

  // Compartments:
  compartment cell = 1e-15 litre; pit.cell is cell;

  // Species:
  species mRNA in cell = 0; pit.mRNA is mRNA;
  species activator in cell = 0; pit.activator is activator;
  species promoter in cell = 0; pit.promoter is promoter;
  species sigmaFactor in cell = 1000; pit.sigmaFactor is sigmaFactor;

  // Parameters:
  ktr = 0.1; pit.ktr is ktr;
  pFreeCisEntities = 1; pit.pFreeCisEntities is pFreeCisEntities;
  kf = 0.01; pit.kf is kf;
  kb = 0.5; pit.kb is kb;

  // Unit definitions:
  unit nano_mole_per_litre = 1e-9 mole;
  unit volume = 1e-15 litre;
  unit per_second = 1 / second;
end

model IPTG_bindsto_LacI_model(kb, complex, cell, kf, reactant, modifier)
  // model units - substance: nano_mole_per_litre, volume: volume

  // Sub-modules:
  binding: bindingwithmodifier_template();

  // Compartments:
  compartment cell = 1e-15 litre; binding.cell is cell;

  // Species:
  species modifier in cell = 1.6611; binding.modifier is modifier;
  species reactant in cell = 0; binding.reactant is reactant;
  species complex in cell = 0; binding.complex is complex;

  // Parameters:
  kf = 0.1; binding.kf is kf;
  kb = 0.5; binding.kb is kb;

  // Unit definitions:
  unit nano_mole_per_litre = 1e-9 mole;
  unit volume = 1e-15 litre;
  unit per_second = 1 / second;
end

model bindingwithmodifier_template(complex, kb, cell, kf, reactant, modifier)
  // model units - substance: nano_mole_per_litre, volume: volume

  // Compartments:
  compartment cell = 1e-15 litre;

  // Species:
  species modifier in cell = 1.6611;
  species reactant in cell = 0;
  species complex in cell = 0;

  // Parameters:
  kf = 0.001;
  kb = 0.5;

  // Reactions:
  binding: reactant => complex; cell*modifier*reactant*kf;  // modifiers: modifier
  unbinding: complex => reactant; cell*complex*kb;

  // Unit definitions:
  unit nano_mole_per_litre = 1e-9 mole;
  unit volume = 1e-15 litre;
  unit per_second = 1 / second;
end

model C_bindsto_D_model(species1, kb, complex, cell, kf, species2)
  // model units - substance: nano_mole_per_litre, volume: volume

  // Sub-modules:
  binding: binding_template();

  // Compartments:
  compartment cell = 1e-15 litre; binding.cell is cell;

  // Species:
  species species1 in cell = 1.6611; binding.species1 is species1;
  species species2 in cell = 0; binding.species2 is species2;
  species complex in cell = 0; binding.complex is complex;

  // Parameters:
  kf = 0.01; binding.kf is kf;
  kb = 0.5; binding.kb is kb;

  // Unit definitions:
  unit nano_mole_per_litre = 1e-9 mole;
  unit volume = 1e-15 litre;
  unit per_second = 1 / second;
end

model C_activates_promD_model(sigmaFactor, kb, ktr, cell, kf, mRNA, activator, promoter, pFreeCisEntities)
  // model units - substance: nano_mole_per_litre, volume: volume

  // Sub-modules:
  pit: promoterinduction_template();

  // Compartments:
  compartment cell = 1e-15 litre; pit.cell is cell;

  // Species:
  species mRNA in cell = 0; pit.mRNA is mRNA;
  species activator in cell = 0; pit.activator is activator;
  species promoter in cell = 0; pit.promoter is promoter;
  species sigmaFactor in cell = 1000; pit.sigmaFactor is sigmaFactor;

  // Parameters:
  ktr = 0.1; pit.ktr is ktr;
  pFreeCisEntities = 1; pit.pFreeCisEntities is pFreeCisEntities;
  kf = 0.001; pit.kf is kf;
  kb = 0.5; pit.kb is kb;

  // Unit definitions:
  unit nano_mole_per_litre = 1e-9 mole;
  unit volume = 1e-15 litre;
  unit per_second = 1 / second;
end

model Ara_bindsto_AraC_model(kb, complex, cell, kf, reactant, modifier)
  // model units - substance: nano_mole_per_litre, volume: volume

  // Sub-modules:
  binding: bindingwithmodifier_template();

  // Compartments:
  compartment cell = 1e-15 litre; binding.cell is cell;

  // Species:
  species modifier in cell = 1.6611; binding.modifier is modifier;
  species reactant in cell = 0; binding.reactant is reactant;
  species complex in cell = 0; binding.complex is complex;

  // Parameters:
  kf = 0.001; binding.kf is kf;
  kb = 0.5; binding.kb is kb;

  // Unit definitions:
  unit nano_mole_per_litre = 1e-9 mole;
  unit volume = 1e-15 litre;
  unit per_second = 1 / second;
end

model CD_activates_promZ_model(sigmaFactor, kb, ktr, cell, kf, mRNA, activator, promoter, pFreeCisEntities)
  // model units - substance: nano_mole_per_litre, volume: volume

  // Sub-modules:
  pit: promoterinduction_template();

  // Compartments:
  compartment cell = 1e-15 litre; pit.cell is cell;

  // Species:
  species mRNA in cell = 0; pit.mRNA is mRNA;
  species activator in cell = 0; pit.activator is activator;
  species promoter in cell = 0; pit.promoter is promoter;
  species sigmaFactor in cell = 1000; pit.sigmaFactor is sigmaFactor;

  // Parameters:
  ktr = 0.1; pit.ktr is ktr;
  pFreeCisEntities = 1; pit.pFreeCisEntities is pFreeCisEntities;
  kf = 0.001; pit.kf is kf;
  kb = 0.5; pit.kb is kb;

  // Unit definitions:
  unit nano_mole_per_litre = 1e-9 mole;
  unit volume = 1e-15 litre;
  unit per_second = 1 / second;
end

model A_bindsto_B_model(species1, kb, complex, cell, kf, species2)
  // model units - substance: nano_mole_per_litre, volume: volume

  // Sub-modules:
  binding: binding_template();

  // Compartments:
  compartment cell = 1e-15 litre; binding.cell is cell;

  // Species:
  species species1 in cell = 1.6611; binding.species1 is species1;
  species species2 in cell = 0; binding.species2 is species2;
  species complex in cell = 0; binding.complex is complex;

  // Parameters:
  kf = 0.1; binding.kf is kf;
  kb = 0.5; binding.kb is kb;

  // Unit definitions:
  unit nano_mole_per_litre = 1e-9 mole;
  unit volume = 1e-15 litre;
  unit per_second = 1 / second;
end

model main()
  // model units - substance: nano_mole_per_litre, volume: volume

  // Sub-modules:
  biosign_dna_model: biosign_dna_model();

  // Unit definitions:
  unit nano_mole_per_litre = 1e-9 mole;
  unit volume = 1e-15 litre;
  unit per_second = 1 / second;
end
