// SBML level 3 version 1

model Sensor_circuit_model(SigmaA, TetR_ATC, ATC, TetR_Dimer, TetR, B, LacI_Dimer, LacI, A, AB, LacI_Tetramer, LacI_IPTG, IPTG, cell)
  // model units - substance: nano_mole_per_litre, volume: volume

  // Sub-modules:
  pConstLacIC1_model: pConstLacI_model();
  rbs1C2_model_pConstLacIC1: rbs1_model();
  cdsLacIC3_model_pConstLacIC1: cdsLacI_model();
  pConstTetRC5_model: pConstTetR_model();
  rbs2C6_model_pConstTetRC5: rbs2_model();
  cdsTetRC7_model_pConstTetRC5: cdsTetR_model();
  TetR_ATC_degradation_model: degradation_template();
  ATC_bindsto_TetR_Dimer_model: ATC_bindsto_TetR_Dimer_model();
  TetR_dimerisation_model: dimerisation();
  LacI_dimerisation_model: dimerisation();
  A_bindsto_B_model: A_bindsto_B_model();
  AB_degradation_model: degradation_template();
  IPTG_bindsto_LacI_Tetramer_model: IPTG_bindsto_LacI_Tetramer_model();
  LacI_IPTG_degradation_model: degradation_template();
  LacI_Dimer_dimerisation_model: dimerisation();

  // Compartments:
  compartment cell = 1e-15 litre; pConstLacIC1_model.cell is cell; rbs1C2_model_pConstLacIC1.cell is cell; cdsLacIC3_model_pConstLacIC1.cell is cell; pConstTetRC5_model.cell is cell; rbs2C6_model_pConstTetRC5.cell is cell; cdsTetRC7_model_pConstTetRC5.cell is cell; TetR_ATC_degradation_model.cell is cell; ATC_bindsto_TetR_Dimer_model.cell is cell; TetR_dimerisation_model.cell is cell; LacI_dimerisation_model.cell is cell; A_bindsto_B_model.cell is cell; AB_degradation_model.cell is cell; IPTG_bindsto_LacI_Tetramer_model.cell is cell; LacI_IPTG_degradation_model.cell is cell; LacI_Dimer_dimerisation_model.cell is cell;

  // Species:
  species SigmaA in cell = 1000; pConstLacIC1_model.SigmaA is SigmaA; pConstTetRC5_model.SigmaA is SigmaA;
  species mrnapConstLacIC1 in cell = 0; pConstLacIC1_model.mRNA is mrnapConstLacIC1; rbs1C2_model_pConstLacIC1.mRNA is mrnapConstLacIC1;
  species pConstLacIC1 in cell = 16.60539; pConstLacIC1_model.pConstLacI is pConstLacIC1;
  species rbs1C2 in cell = 16.60539; rbs1C2_model_pConstLacIC1.rbs is rbs1C2;
  species cdsLacIC3 in cell = 16.60539; cdsLacIC3_model_pConstLacIC1.cds is cdsLacIC3;
  species mrnapConstTetRC5 in cell = 0; pConstTetRC5_model.mRNA is mrnapConstTetRC5; rbs2C6_model_pConstTetRC5.mRNA is mrnapConstTetRC5;
  species pConstTetRC5 in cell = 16.60539; pConstTetRC5_model.pConstTetR is pConstTetRC5;
  species rbs2C6 in cell = 16.60539; rbs2C6_model_pConstTetRC5.rbs is rbs2C6;
  species cdsTetRC7 in cell = 16.60539; cdsTetRC7_model_pConstTetRC5.cds is cdsTetRC7;
  species TetR_ATC in cell = 0; TetR_ATC_degradation_model.species is TetR_ATC; ATC_bindsto_TetR_Dimer_model.complex is TetR_ATC;
  species ATC in cell = 0; ATC_bindsto_TetR_Dimer_model.modifier is ATC;
  species TetR_Dimer in cell = 0; ATC_bindsto_TetR_Dimer_model.reactant is TetR_Dimer; TetR_dimerisation_model.dimer is TetR_Dimer;
  species TetR in cell = 0; TetR_dimerisation_model.species is TetR; cdsTetRC7_model_pConstTetRC5.protein is TetR;
  species B in cell = 0; A_bindsto_B_model.species2 is B;
  species LacI_Dimer in cell = 0; LacI_dimerisation_model.dimer is LacI_Dimer; LacI_Dimer_dimerisation_model.species is LacI_Dimer;
  species LacI in cell = 0; LacI_dimerisation_model.species is LacI; cdsLacIC3_model_pConstLacIC1.protein is LacI;
  species A in cell = 0; A_bindsto_B_model.species1 is A;
  species AB in cell = 0; AB_degradation_model.species is AB; A_bindsto_B_model.complex is AB;
  species LacI_Tetramer in cell = 0; IPTG_bindsto_LacI_Tetramer_model.reactant is LacI_Tetramer; LacI_Dimer_dimerisation_model.dimer is LacI_Tetramer;
  species LacI_IPTG in cell = 0; LacI_IPTG_degradation_model.species is LacI_IPTG; IPTG_bindsto_LacI_Tetramer_model.complex is LacI_IPTG;
  species IPTG in cell = 0; IPTG_bindsto_LacI_Tetramer_model.modifier is IPTG;

  // Parameters:
  ripsrbs1C2_mrnapConstLacIC1 = ; rbs1C2_model_pConstLacIC1.rips is ripsrbs1C2_mrnapConstLacIC1; cdsLacIC3_model_pConstLacIC1.rips is ripsrbs1C2_mrnapConstLacIC1;
  ripsrbs2C6_mrnapConstTetRC5 = ; rbs2C6_model_pConstTetRC5.rips is ripsrbs2C6_mrnapConstTetRC5; cdsTetRC7_model_pConstTetRC5.rips is ripsrbs2C6_mrnapConstTetRC5;

  // Assignment rules:
  pConstLacIC1pFreeCisEntities := rbs1C2/16.60539*(cdsLacIC3/16.60539);
  pConstTetRC5pFreeCisEntities := rbs2C6/16.60539*(cdsTetRC7/16.60539);

  // Unit definitions:
  unit nano_mole_per_litre = 1e-9 mole;
  unit volume = 1e-15 litre;
  unit per_second = 1 / second;
end

model pConstLacI_model(SigmaA, ktr, cell, mRNA, pConstLacI, pFreeCisEntities)
  // model units - substance: nano_mole_per_litre, volume: volume

  // Sub-modules:
  pt: promoter_template();

  // Compartments:
  compartment cell = 1e-15 litre; pt.cell is cell;

  // Species:
  species mRNA in cell = 0; pt.mRNA is mRNA;
  species pConstLacI in cell = 1; pt.promoter is pConstLacI;
  species SigmaA in cell = 1000; pt.sigmaFactor is SigmaA;

  // Parameters:
  ktr = 0.1; pt.ktr is ktr;
  pFreeCisEntities = 1; pt.pFreeCisEntities is pFreeCisEntities;

  // Unit definitions:
  unit nano_mole_per_litre = 1e-9 mole;
  unit volume = 1e-15 litre;
  unit per_second = 1 / second;
end

model promoter_template(sigmaFactor, ktr, cell, mRNA, kdeg, promoter, pFreeCisEntities)
  // model units - substance: nano_mole_per_litre, volume: volume

  // Sub-modules:
  transcription: transcription_template();
  mrna_degradation: degradation_template();

  // Compartments:
  compartment cell = 1e-15 litre; transcription.cell is cell; mrna_degradation.cell is cell;

  // Species:
  species promoter in cell = 1.6611; transcription.popsSpecies is promoter;
  species mRNA in cell = 0; transcription.mRNA is mRNA; mrna_degradation.species is mRNA;
  species sigmaFactor in cell = 1000; transcription.sigmaFactor is sigmaFactor;

  // Parameters:
  ktr = 0.1; transcription.ktr is ktr;
  kdeg = 0.0058; mrna_degradation.kdeg is kdeg;
  pFreeCisEntities = 1; transcription.pFreeCisEntities is pFreeCisEntities;

  // Unit definitions:
  unit nano_mole_per_litre = 1e-9 mole;
  unit volume = 1e-15 litre;
  unit per_second = 1 / second;
end

model transcription_template(sigmaFactor, ktr, cell, mRNA, popsSpecies, pFreeCisEntities)
  // model units - substance: nano_mole_per_litre, volume: volume

  // Compartments:
  compartment cell = 1e-15 litre;

  // Species:
  species popsSpecies in cell = 1.6611;
  species mRNA in cell = 0;
  species sigmaFactor in cell = 1000;

  // Parameters:
  kmSF = 50;
  ktr = 0.1;
  pFreeCisEntities = 1;

  // Reactions:
  transcription: popsSpecies => popsSpecies + mRNA; cell*popsSpecies*ktr*(sigmaFactor/(sigmaFactor + kmSF))*pFreeCisEntities;  // modifiers: sigmaFactor

  // Unit definitions:
  unit nano_mole_per_litre = 1e-9 mole;
  unit volume = 1e-15 litre;
  unit per_second = 1 / second;
end

model degradation_template(species, cell, kdeg)
  // model units - substance: nano_mole_per_litre, volume: volume

  // Compartments:
  compartment cell = 1e-15 litre;

  // Species:
  species species in cell = 0;

  // Parameters:
  kdeg = 0.0012;

  // Reactions:
  degradation: species => ; cell*species*kdeg;

  // Unit definitions:
  unit nano_mole_per_litre = 1e-9 mole;
  unit volume = 1e-15 litre;
  unit per_second = 1 / second;
end

model rbs1_model(rips, cell, mRNA, ktl, rbs)
  // model units - substance: nano_mole_per_litre, volume: volume

  // Sub-modules:
  rt: rbs_template();

  // Compartments:
  compartment cell = 1e-15 litre; rt.cell is cell;

  // Species:
  species mRNA in cell = 0; rt.mRNA is mRNA;
  species rbs in cell = 1; rt.rbs is rbs;

  // Parameters:
  ktl = 0.01; rt.ktl is ktl;
  rips = ; rt.rips is rips;

  // Unit definitions:
  unit nano_mole_per_litre = 1e-9 mole;
  unit volume = 1e-15 litre;
  unit per_second = 1 / second;
end

model rbs_template(rips, cell, ktl, mRNA, rbs)
  // model units - substance: nano_mole_per_litre, volume: volume

  // Compartments:
  compartment cell = 1e-15 litre;

  // Species:
  species mRNA in cell = 0;
  species rbs in cell = 1;

  // Parameters:
  ktl = 0.1;

  // Assignment rules:
  rips := ktl*mRNA;

  // Unit definitions:
  unit nano_mole_per_litre = 1e-9 mole;
  unit volume = 1e-15 litre;
  unit per_second = 1 / second;
end

model cdsLacI_model(protein, rips, cell, cds)
  // model units - substance: nano_mole_per_litre, volume: volume

  // Sub-modules:
  ct: cds_template();

  // Compartments:
  compartment cell = 1e-15 litre; ct.cell is cell;

  // Species:
  species protein in cell = 0; ct.protein is protein;
  species cds in cell = 1;

  // Parameters:
  rips = ; ct.rips is rips;

  // Unit definitions:
  unit nano_mole_per_litre = 1e-9 mole;
  unit volume = 1e-15 litre;
  unit per_second = 1 / second;
end

model cds_template(protein, rips, cell, kdeg)
  // model units - substance: nano_mole_per_litre, volume: volume

  // Sub-modules:
  cdsproduct_degradation: degradation_template();

  // Compartments:
  compartment cell = 1e-15 litre; cdsproduct_degradation.cell is cell;

  // Species:
  species protein in cell = 0; cdsproduct_degradation.species is protein;

  // Parameters:
  rips = ;
  kdeg = 0.0012; cdsproduct_degradation.kdeg is kdeg;

  // Reactions:
  translation: => protein; cell*rips;

  // Unit definitions:
  unit nano_mole_per_litre = 1e-9 mole;
  unit volume = 1e-15 litre;
  unit per_second = 1 / second;
end

model pConstTetR_model(SigmaA, ktr, cell, mRNA, pConstTetR, pFreeCisEntities)
  // model units - substance: nano_mole_per_litre, volume: volume

  // Sub-modules:
  pt: promoter_template();

  // Compartments:
  compartment cell = 1e-15 litre; pt.cell is cell;

  // Species:
  species mRNA in cell = 0; pt.mRNA is mRNA;
  species pConstTetR in cell = 1; pt.promoter is pConstTetR;
  species SigmaA in cell = 1000; pt.sigmaFactor is SigmaA;

  // Parameters:
  ktr = 0.1; pt.ktr is ktr;
  pFreeCisEntities = 1; pt.pFreeCisEntities is pFreeCisEntities;

  // Unit definitions:
  unit nano_mole_per_litre = 1e-9 mole;
  unit volume = 1e-15 litre;
  unit per_second = 1 / second;
end

model rbs2_model(rips, cell, mRNA, ktl, rbs)
  // model units - substance: nano_mole_per_litre, volume: volume

  // Sub-modules:
  rt: rbs_template();

  // Compartments:
  compartment cell = 1e-15 litre; rt.cell is cell;

  // Species:
  species mRNA in cell = 0; rt.mRNA is mRNA;
  species rbs in cell = 1; rt.rbs is rbs;

  // Parameters:
  ktl = 0.01; rt.ktl is ktl;
  rips = ; rt.rips is rips;

  // Unit definitions:
  unit nano_mole_per_litre = 1e-9 mole;
  unit volume = 1e-15 litre;
  unit per_second = 1 / second;
end

model cdsTetR_model(protein, rips, cell, cds)
  // model units - substance: nano_mole_per_litre, volume: volume

  // Sub-modules:
  ct: cds_template();

  // Compartments:
  compartment cell = 1e-15 litre; ct.cell is cell;

  // Species:
  species protein in cell = 0; ct.protein is protein;
  species cds in cell = 1;

  // Parameters:
  rips = ; ct.rips is rips;

  // Unit definitions:
  unit nano_mole_per_litre = 1e-9 mole;
  unit volume = 1e-15 litre;
  unit per_second = 1 / second;
end

model ATC_bindsto_TetR_Dimer_model(kb, complex, cell, kf, reactant, modifier)
  // model units - substance: nano_mole_per_litre, volume: volume

  // Sub-modules:
  binding: bindingwithmodifier_template();

  // Compartments:
  compartment cell = 1e-15 litre; binding.cell is cell;

  // Species:
  species modifier in cell = 1.6611; binding.modifier is modifier;
  species reactant in cell = 0; binding.reactant is reactant;
  species complex in cell = 0; binding.complex is complex;

  // Parameters:
  kf = 0.25; binding.kf is kf;
  kb = 0.27; binding.kb is kb;

  // Unit definitions:
  unit nano_mole_per_litre = 1e-9 mole;
  unit volume = 1e-15 litre;
  unit per_second = 1 / second;
end

model bindingwithmodifier_template(complex, kb, cell, kf, reactant, modifier)
  // model units - substance: nano_mole_per_litre, volume: volume

  // Compartments:
  compartment cell = 1e-15 litre;

  // Species:
  species modifier in cell = 1.6611;
  species reactant in cell = 0;
  species complex in cell = 0;

  // Parameters:
  kf = 0.001;
  kb = 0.5;

  // Reactions:
  binding: reactant => complex; cell*modifier*reactant*kf;  // modifiers: modifier
  unbinding: complex => reactant; cell*complex*kb;

  // Unit definitions:
  unit nano_mole_per_litre = 1e-9 mole;
  unit volume = 1e-15 litre;
  unit per_second = 1 / second;
end

model dimerisation(dimer, kb, cell, kf, species)
  // model units - substance: nano_mole_per_litre, volume: volume

  // Sub-modules:
  dt: dimerisation_template();

  // Compartments:
  compartment cell = 1e-15 litre; dt.cell is cell;

  // Species:
  species species in cell = 0; dt.species1 is species;
  species dimer in cell = 0; dt.complex is dimer;

  // Parameters:
  kf = 0.001; dt.kf is kf;
  kb = 0.2; dt.kb is kb;

  // Unit definitions:
  unit nano_mole_per_litre = 1e-9 mole;
  unit volume = 1e-15 litre;
  unit per_second = 1 / second;
end

model dimerisation_template(complex, kb, cell, kf, species1)
  // model units - substance: nano_mole_per_litre, volume: volume

  // Sub-modules:
  dimer_degradation: degradation_template();

  // Compartments:
  compartment cell = 1e-15 litre; dimer_degradation.cell is cell;

  // Species:
  species species1 in cell = 1.6611;
  species complex in cell = 0; dimer_degradation.species is complex;

  // Parameters:
  kf = 0.0001;
  kb = 0.5;

  // Reactions:
  binding: 2 species1 => complex; cell*species1*species1*kf;
  unbinding: complex => 2 species1; cell*complex*kb;

  // Unit definitions:
  unit nano_mole_per_litre = 1e-9 mole;
  unit volume = 1e-15 litre;
  unit per_second = 1 / second;
end

model A_bindsto_B_model(species1, kb, complex, cell, kf, species2)
  // model units - substance: nano_mole_per_litre, volume: volume

  // Sub-modules:
  binding: binding_template();

  // Compartments:
  compartment cell = 1e-15 litre; binding.cell is cell;

  // Species:
  species species1 in cell = 1.6611; binding.species1 is species1;
  species species2 in cell = 0; binding.species2 is species2;
  species complex in cell = 0; binding.complex is complex;

  // Parameters:
  kf = 0.1; binding.kf is kf;
  kb = 0.5; binding.kb is kb;

  // Unit definitions:
  unit nano_mole_per_litre = 1e-9 mole;
  unit volume = 1e-15 litre;
  unit per_second = 1 / second;
end

model binding_template(species1, complex, kb, cell, kf, species2)
  // model units - substance: nano_mole_per_litre, volume: volume

  // Compartments:
  compartment cell = 1e-15 litre;

  // Species:
  species species1 in cell = 1.6611;
  species species2 in cell = 0;
  species complex in cell = 0;

  // Parameters:
  kf = 0.001;
  kb = 0.5;

  // Reactions:
  binding: species1 + species2 => complex; cell*species1*species2*kf;
  unbinding: complex => species1 + species2; cell*complex*kb;

  // Unit definitions:
  unit nano_mole_per_litre = 1e-9 mole;
  unit volume = 1e-15 litre;
  unit per_second = 1 / second;
end

model IPTG_bindsto_LacI_Tetramer_model(kb, complex, cell, kf, reactant, modifier)
  // model units - substance: nano_mole_per_litre, volume: volume

  // Sub-modules:
  binding: bindingwithmodifier_template();

  // Compartments:
  compartment cell = 1e-15 litre; binding.cell is cell;

  // Species:
  species modifier in cell = 1.6611; binding.modifier is modifier;
  species reactant in cell = 0; binding.reactant is reactant;
  species complex in cell = 0; binding.complex is complex;

  // Parameters:
  kf = 0.2; binding.kf is kf;
  kb = 0.27; binding.kb is kb;

  // Unit definitions:
  unit nano_mole_per_litre = 1e-9 mole;
  unit volume = 1e-15 litre;
  unit per_second = 1 / second;
end

model B_circuit_model(SigmaA, TetR_ATC, ATC, TetR_Dimer, TetR, B, LacI_Dimer, LacI, A, AB, LacI_Tetramer, LacI_IPTG, IPTG, cell)
  // model units - substance: nano_mole_per_litre, volume: volume

  // Sub-modules:
  pTetC1_model: pTet_model();
  rbsTetRC2_model_pTetC1: rbsTetR_model();
  cdsBC3_model_pTetC1: cdsB_model();
  TetR_Dimer_represses_pTet_pTetC1_model: TetR_Dimer_represses_pTet_model();

  // Compartments:
  compartment cell = 1e-15 litre; pTetC1_model.cell is cell; rbsTetRC2_model_pTetC1.cell is cell; cdsBC3_model_pTetC1.cell is cell; TetR_Dimer_represses_pTet_pTetC1_model.cell is cell;

  // Species:
  species SigmaA in cell = 1000; pTetC1_model.SigmaA is SigmaA;
  species mrnapTetC1 in cell = 0; pTetC1_model.mRNA is mrnapTetC1; rbsTetRC2_model_pTetC1.mRNA is mrnapTetC1; TetR_Dimer_represses_pTet_pTetC1_model.mRNA is mrnapTetC1;
  species pTetC1 in cell = 16.60539; pTetC1_model.pTet is pTetC1; TetR_Dimer_represses_pTet_pTetC1_model.promoter is pTetC1;
  species rbsTetRC2 in cell = 16.60539; rbsTetRC2_model_pTetC1.rbs is rbsTetRC2;
  species cdsBC3 in cell = 16.60539; cdsBC3_model_pTetC1.cds is cdsBC3;
  species TetR_ATC in cell = 0;
  species ATC in cell = 0;
  species TetR_Dimer in cell = 0; TetR_Dimer_represses_pTet_pTetC1_model.inhibitor is TetR_Dimer;
  species TetR in cell = 0;
  species B in cell = 0; cdsBC3_model_pTetC1.protein is B;
  species LacI_Dimer in cell = 0;
  species LacI in cell = 0;
  species A in cell = 0;
  species AB in cell = 0;
  species LacI_Tetramer in cell = 0;
  species LacI_IPTG in cell = 0;
  species IPTG in cell = 0;

  // Parameters:
  ripsrbsTetRC2_mrnapTetC1 = ; rbsTetRC2_model_pTetC1.rips is ripsrbsTetRC2_mrnapTetC1; cdsBC3_model_pTetC1.rips is ripsrbsTetRC2_mrnapTetC1;

  // Assignment rules:
  pTetC1pFreeCisEntities := rbsTetRC2/16.60539*(cdsBC3/16.60539);

  // Unit definitions:
  unit nano_mole_per_litre = 1e-9 mole;
  unit volume = 1e-15 litre;
  unit per_second = 1 / second;
end

model pTet_model(SigmaA, ktr, cell, mRNA, pTet, pFreeCisEntities)
  // model units - substance: nano_mole_per_litre, volume: volume

  // Sub-modules:
  pt: promoter_template();

  // Compartments:
  compartment cell = 1e-15 litre; pt.cell is cell;

  // Species:
  species mRNA in cell = 0; pt.mRNA is mRNA;
  species pTet in cell = 1; pt.promoter is pTet;
  species SigmaA in cell = 1000; pt.sigmaFactor is SigmaA;

  // Parameters:
  ktr = 0.05; pt.ktr is ktr;
  pFreeCisEntities = 1; pt.pFreeCisEntities is pFreeCisEntities;

  // Unit definitions:
  unit nano_mole_per_litre = 1e-9 mole;
  unit volume = 1e-15 litre;
  unit per_second = 1 / second;
end

model rbsTetR_model(rips, cell, mRNA, ktl, rbs)
  // model units - substance: nano_mole_per_litre, volume: volume

  // Sub-modules:
  rt: rbs_template();

  // Compartments:
  compartment cell = 1e-15 litre; rt.cell is cell;

  // Species:
  species mRNA in cell = 0; rt.mRNA is mRNA;
  species rbs in cell = 1; rt.rbs is rbs;

  // Parameters:
  ktl = 0.0195; rt.ktl is ktl;
  rips = ; rt.rips is rips;

  // Unit definitions:
  unit nano_mole_per_litre = 1e-9 mole;
  unit volume = 1e-15 litre;
  unit per_second = 1 / second;
end

model cdsB_model(protein, rips, cell, cds)
  // model units - substance: nano_mole_per_litre, volume: volume

  // Sub-modules:
  ct: cds_template();

  // Compartments:
  compartment cell = 1e-15 litre; ct.cell is cell;

  // Species:
  species protein in cell = 0; ct.protein is protein;
  species cds in cell = 1;

  // Parameters:
  rips = ; ct.rips is rips;

  // Unit definitions:
  unit nano_mole_per_litre = 1e-9 mole;
  unit volume = 1e-15 litre;
  unit per_second = 1 / second;
end

model TetR_Dimer_represses_pTet_model(kb, inhibitor, cell, kf, mRNA, promoter)
  // model units - substance: nano_mole_per_litre, volume: volume

  // Sub-modules:
  prt: promoterrepression_template();

  // Compartments:
  compartment cell = 1e-15 litre; prt.cell is cell;

  // Species:
  species mRNA in cell = 0; prt.mRNA is mRNA;
  species inhibitor in cell = 0; prt.activator is inhibitor;
  species promoter in cell = 0; prt.promoter is promoter;

  // Parameters:
  kf = 0.025; prt.kf is kf;
  kb = 0.2; prt.kb is kb;

  // Unit definitions:
  unit nano_mole_per_litre = 1e-9 mole;
  unit volume = 1e-15 litre;
  unit per_second = 1 / second;
end

model promoterrepression_template(kb, activator, cell, kf, mRNA, promoter)
  // model units - substance: nano_mole_per_litre, volume: volume

  // Sub-modules:
  binding: binding_template();

  // Compartments:
  compartment cell = 1e-15 litre; binding.cell is cell;

  // Species:
  species promoter in cell = 1.6611; binding.species1 is promoter;
  species activator in cell = 0; binding.species2 is activator;
  species promoterRepressor in cell = 0; binding.complex is promoterRepressor;
  species mRNA in cell = 0;

  // Parameters:
  kf = 0.001; binding.kf is kf;
  kb = 0.5; binding.kb is kb;

  // Unit definitions:
  unit nano_mole_per_litre = 1e-9 mole;
  unit volume = 1e-15 litre;
  unit per_second = 1 / second;
end

model A_circuit_model(SigmaA, TetR_ATC, ATC, TetR_Dimer, TetR, LacI_Tetramer, B, LacI_Dimer, LacI, A, AB, LacI_IPTG, IPTG, cell)
  // model units - substance: nano_mole_per_litre, volume: volume

  // Sub-modules:
  pLacIC1_model: pLacI_model();
  rbsLacIC2_model_pLacIC1: rbsLacI_model();
  cdsAC3_model_pLacIC1: cdsA_model();
  LacI_Tetramer_represses_pLacI_pLacIC1_model: LacI_Tetramer_represses_pLacI_model();

  // Compartments:
  compartment cell = 1e-15 litre; pLacIC1_model.cell is cell; rbsLacIC2_model_pLacIC1.cell is cell; cdsAC3_model_pLacIC1.cell is cell; LacI_Tetramer_represses_pLacI_pLacIC1_model.cell is cell;

  // Species:
  species SigmaA in cell = 1000; pLacIC1_model.SigmaA is SigmaA;
  species mrnapLacIC1 in cell = 0; pLacIC1_model.mRNA is mrnapLacIC1; rbsLacIC2_model_pLacIC1.mRNA is mrnapLacIC1; LacI_Tetramer_represses_pLacI_pLacIC1_model.mRNA is mrnapLacIC1;
  species pLacIC1 in cell = 16.60539; pLacIC1_model.pLacI is pLacIC1; LacI_Tetramer_represses_pLacI_pLacIC1_model.promoter is pLacIC1;
  species rbsLacIC2 in cell = 16.60539; rbsLacIC2_model_pLacIC1.rbs is rbsLacIC2;
  species cdsAC3 in cell = 16.60539; cdsAC3_model_pLacIC1.cds is cdsAC3;
  species TetR_ATC in cell = 0;
  species ATC in cell = 0;
  species TetR_Dimer in cell = 0;
  species TetR in cell = 0;
  species LacI_Tetramer in cell = 0; LacI_Tetramer_represses_pLacI_pLacIC1_model.inhibitor is LacI_Tetramer;
  species B in cell = 0;
  species LacI_Dimer in cell = 0;
  species LacI in cell = 0;
  species A in cell = 0; cdsAC3_model_pLacIC1.protein is A;
  species AB in cell = 0;
  species LacI_IPTG in cell = 0;
  species IPTG in cell = 0;

  // Parameters:
  ripsrbsLacIC2_mrnapLacIC1 = ; rbsLacIC2_model_pLacIC1.rips is ripsrbsLacIC2_mrnapLacIC1; cdsAC3_model_pLacIC1.rips is ripsrbsLacIC2_mrnapLacIC1;

  // Assignment rules:
  pLacIC1pFreeCisEntities := rbsLacIC2/16.60539*(cdsAC3/16.60539);

  // Unit definitions:
  unit nano_mole_per_litre = 1e-9 mole;
  unit volume = 1e-15 litre;
  unit per_second = 1 / second;
end

model pLacI_model(SigmaA, ktr, cell, mRNA, pLacI, pFreeCisEntities)
  // model units - substance: nano_mole_per_litre, volume: volume

  // Sub-modules:
  pt: promoter_template();

  // Compartments:
  compartment cell = 1e-15 litre; pt.cell is cell;

  // Species:
  species mRNA in cell = 0; pt.mRNA is mRNA;
  species pLacI in cell = 1; pt.promoter is pLacI;
  species SigmaA in cell = 1000; pt.sigmaFactor is SigmaA;

  // Parameters:
  ktr = 0.03; pt.ktr is ktr;
  pFreeCisEntities = 1; pt.pFreeCisEntities is pFreeCisEntities;

  // Unit definitions:
  unit nano_mole_per_litre = 1e-9 mole;
  unit volume = 1e-15 litre;
  unit per_second = 1 / second;
end

model rbsLacI_model(rips, cell, mRNA, ktl, rbs)
  // model units - substance: nano_mole_per_litre, volume: volume

  // Sub-modules:
  rt: rbs_template();

  // Compartments:
  compartment cell = 1e-15 litre; rt.cell is cell;

  // Species:
  species mRNA in cell = 0; rt.mRNA is mRNA;
  species rbs in cell = 1; rt.rbs is rbs;

  // Parameters:
  ktl = 0.015; rt.ktl is ktl;
  rips = ; rt.rips is rips;

  // Unit definitions:
  unit nano_mole_per_litre = 1e-9 mole;
  unit volume = 1e-15 litre;
  unit per_second = 1 / second;
end

model cdsA_model(protein, rips, cell, cds)
  // model units - substance: nano_mole_per_litre, volume: volume

  // Sub-modules:
  ct: cds_template();

  // Compartments:
  compartment cell = 1e-15 litre; ct.cell is cell;

  // Species:
  species protein in cell = 0; ct.protein is protein;
  species cds in cell = 1;

  // Parameters:
  rips = ; ct.rips is rips;

  // Unit definitions:
  unit nano_mole_per_litre = 1e-9 mole;
  unit volume = 1e-15 litre;
  unit per_second = 1 / second;
end

model LacI_Tetramer_represses_pLacI_model(kb, inhibitor, cell, kf, mRNA, promoter)
  // model units - substance: nano_mole_per_litre, volume: volume

  // Sub-modules:
  prt: promoterrepression_template();

  // Compartments:
  compartment cell = 1e-15 litre; prt.cell is cell;

  // Species:
  species mRNA in cell = 0; prt.mRNA is mRNA;
  species inhibitor in cell = 0; prt.activator is inhibitor;
  species promoter in cell = 0; prt.promoter is promoter;

  // Parameters:
  kf = 0.06; prt.kf is kf;
  kb = 0.2; prt.kb is kb;

  // Unit definitions:
  unit nano_mole_per_litre = 1e-9 mole;
  unit volume = 1e-15 litre;
  unit per_second = 1 / second;
end

model main()
  // model units - substance: nano_mole_per_litre, volume: volume

  // Sub-modules:
  Sensor_circuit_model: Sensor_circuit_model();
  B_circuit_model: B_circuit_model();
  A_circuit_model: A_circuit_model();

  // Compartments:
  compartment cell = 1e-15 litre; Sensor_circuit_model.cell is cell; B_circuit_model.cell is cell; A_circuit_model.cell is cell;

  // Species:
  species SigmaA in cell = 1000; Sensor_circuit_model.SigmaA is SigmaA; B_circuit_model.SigmaA is SigmaA; A_circuit_model.SigmaA is SigmaA;
  species TetR_ATC in cell = 0; Sensor_circuit_model.TetR_ATC is TetR_ATC; B_circuit_model.TetR_ATC is TetR_ATC; A_circuit_model.TetR_ATC is TetR_ATC;
  species ATC in cell = 0; Sensor_circuit_model.ATC is ATC; B_circuit_model.ATC is ATC; A_circuit_model.ATC is ATC;
  species TetR_Dimer in cell = 0; Sensor_circuit_model.TetR_Dimer is TetR_Dimer; B_circuit_model.TetR_Dimer is TetR_Dimer; A_circuit_model.TetR_Dimer is TetR_Dimer;
  species TetR in cell = 0; Sensor_circuit_model.TetR is TetR; B_circuit_model.TetR is TetR; A_circuit_model.TetR is TetR;
  species B in cell = 0; Sensor_circuit_model.B is B; B_circuit_model.B is B; A_circuit_model.B is B;
  species LacI_Dimer in cell = 0; Sensor_circuit_model.LacI_Dimer is LacI_Dimer; B_circuit_model.LacI_Dimer is LacI_Dimer; A_circuit_model.LacI_Dimer is LacI_Dimer;
  species LacI in cell = 0; Sensor_circuit_model.LacI is LacI; B_circuit_model.LacI is LacI; A_circuit_model.LacI is LacI;
  species A in cell = 0; Sensor_circuit_model.A is A; B_circuit_model.A is A; A_circuit_model.A is A;
  species AB in cell = 0; Sensor_circuit_model.AB is AB; B_circuit_model.AB is AB; A_circuit_model.AB is AB;
  species LacI_Tetramer in cell = 0; Sensor_circuit_model.LacI_Tetramer is LacI_Tetramer; B_circuit_model.LacI_Tetramer is LacI_Tetramer; A_circuit_model.LacI_Tetramer is LacI_Tetramer;
  species LacI_IPTG in cell = 0; Sensor_circuit_model.LacI_IPTG is LacI_IPTG; B_circuit_model.LacI_IPTG is LacI_IPTG; A_circuit_model.LacI_IPTG is LacI_IPTG;
  species IPTG in cell = 0; Sensor_circuit_model.IPTG is IPTG; B_circuit_model.IPTG is IPTG; A_circuit_model.IPTG is IPTG;

  // Assignment rules:
  A_B_ratio := A/B;

  // Events:
  IPTG_setevent0: at (time == 1), persistent=false: IPTG = 50;
  ATC_unsetevent0: at (time == 0), persistent=false: ATC = 0;
  IPTG_unsetevent1: at (time == 7200), persistent=false: IPTG = 0;
  ATC_setevent1: at (time == 7201), persistent=false: ATC = 50;
  IPTG_setevent2: at (time == 9001), persistent=false: IPTG = 50;
  ATC_unsetevent2: at (time == 9000), persistent=false: ATC = 0;
  IPTG_unsetevent3: at (time == 16200), persistent=false: IPTG = 0;
  ATC_setevent3: at (time == 16201), persistent=false: ATC = 50;
  IPTG_setevent4: at (time == 18001), persistent=false: IPTG = 50;
  ATC_unsetevent4: at (time == 18000), persistent=false: ATC = 0;
  IPTG_unsetevent5: at (time == 25200), persistent=false: IPTG = 0;
  ATC_setevent5: at (time == 25201), persistent=false: ATC = 50;
  IPTG_setevent6: at (time == 27001), persistent=false: IPTG = 50;
  ATC_unsetevent6: at (time == 27000), persistent=false: ATC = 0;
  IPTG_unsetevent7: at (time == 34200), persistent=false: IPTG = 0;
  ATC_setevent7: at (time == 34201), persistent=false: ATC = 50;
  IPTG_setevent8: at (time == 36001), persistent=false: IPTG = 50;
  ATC_unsetevent8: at (time == 36000), persistent=false: ATC = 0;
  IPTG_unsetevent9: at (time == 43200), persistent=false: IPTG = 0;
  ATC_setevent9: at (time == 43201), persistent=false: ATC = 50;
  IPTG_setevent10: at (time == 45001), persistent=false: IPTG = 50;
  ATC_unsetevent10: at (time == 45000), persistent=false: ATC = 0;
  IPTG_unsetevent11: at (time == 52200), persistent=false: IPTG = 0;
  ATC_setevent11: at (time == 52201), persistent=false: ATC = 50;
  IPTG_unsetevent12: at (time == 54000), persistent=false: IPTG = 25;
  ATC_setevent12: at (time == 54000), persistent=false: ATC = 25;

  // Unit definitions:
  unit nano_mole_per_litre = 1e-9 mole;
  unit volume = 1e-15 litre;
  unit per_second = 1 / second;
end
