// SBML level 3 version 1

model B_circuit_model(SigmaA, TetR_ATC, ATC, TetR_Dimer, TetR, B, LacI_Dimer, LacI, A, AB, LacI_Tetramer, LacI_IPTG, IPTG, cell)
  // model units - substance: nano_mole_per_litre, volume: volume

  // Sub-modules:
  pTetC1_model: pTet_model();
  rbsTetRC2_model_pTetC1: rbsTetR_model();
  cdsBC3_model_pTetC1: cdsB_model();
  TetR_ATC_degradation_model: degradation_template();
  ATC_bindsto_TetR_Dimer_model: ATC_bindsto_TetR_Dimer_model();
  TetR_Dimer_represses_pTet_pTetC1_model: TetR_Dimer_represses_pTet_model();
  TetR_dimerisation_model: dimerisation();
  LacI_dimerisation_model: dimerisation();
  A_bindsto_B_model: A_bindsto_B_model();
  AB_degradation_model: degradation_template();
  IPTG_bindsto_LacI_Tetramer_model: IPTG_bindsto_LacI_Tetramer_model();
  LacI_IPTG_degradation_model: degradation_template();
  LacI_Dimer_dimerisation_model: dimerisation();

  // Compartments:
  compartment cell = 1e-15 litre; pTetC1_model.cell is cell; rbsTetRC2_model_pTetC1.cell is cell; cdsBC3_model_pTetC1.cell is cell; TetR_ATC_degradation_model.cell is cell; ATC_bindsto_TetR_Dimer_model.cell is cell; TetR_Dimer_represses_pTet_pTetC1_model.cell is cell; TetR_dimerisation_model.cell is cell; LacI_dimerisation_model.cell is cell; A_bindsto_B_model.cell is cell; AB_degradation_model.cell is cell; IPTG_bindsto_LacI_Tetramer_model.cell is cell; LacI_IPTG_degradation_model.cell is cell; LacI_Dimer_dimerisation_model.cell is cell;

  // Species:
  species SigmaA in cell = 1000; pTetC1_model.SigmaA is SigmaA;
  species mrnapTetC1 in cell = 0; pTetC1_model.mRNA is mrnapTetC1; rbsTetRC2_model_pTetC1.mRNA is mrnapTetC1; TetR_Dimer_represses_pTet_pTetC1_model.mRNA is mrnapTetC1;
  species pTetC1 in cell = 16.60539; pTetC1_model.pTet is pTetC1; TetR_Dimer_represses_pTet_pTetC1_model.promoter is pTetC1;
  species rbsTetRC2 in cell = 16.60539; rbsTetRC2_model_pTetC1.rbs is rbsTetRC2;
  species cdsBC3 in cell = 16.60539; cdsBC3_model_pTetC1.cds is cdsBC3;
  species TetR_ATC in cell = 0; TetR_ATC_degradation_model.species is TetR_ATC; ATC_bindsto_TetR_Dimer_model.complex is TetR_ATC;
  species ATC in cell = 0; ATC_bindsto_TetR_Dimer_model.modifier is ATC;
  species TetR_Dimer in cell = 0; ATC_bindsto_TetR_Dimer_model.reactant is TetR_Dimer; TetR_Dimer_represses_pTet_pTetC1_model.inhibitor is TetR_Dimer; TetR_dimerisation_model.dimer is TetR_Dimer;
  species TetR in cell = 0; TetR_dimerisation_model.species is TetR;
  species B in cell = 0; cdsBC3_model_pTetC1.protein is B; A_bindsto_B_model.species2 is B;
  species LacI_Dimer in cell = 0; LacI_dimerisation_model.dimer is LacI_Dimer; LacI_Dimer_dimerisation_model.species is LacI_Dimer;
  species LacI in cell = 0; LacI_dimerisation_model.species is LacI;
  species A in cell = 0; A_bindsto_B_model.species1 is A;
  species AB in cell = 0; AB_degradation_model.species is AB; A_bindsto_B_model.complex is AB;
  species LacI_Tetramer in cell = 0; IPTG_bindsto_LacI_Tetramer_model.reactant is LacI_Tetramer; LacI_Dimer_dimerisation_model.dimer is LacI_Tetramer;
  species LacI_IPTG in cell = 0; LacI_IPTG_degradation_model.species is LacI_IPTG; IPTG_bindsto_LacI_Tetramer_model.complex is LacI_IPTG;
  species IPTG in cell = 0; IPTG_bindsto_LacI_Tetramer_model.modifier is IPTG;

  // Parameters:
  ripsrbsTetRC2_mrnapTetC1 = ; rbsTetRC2_model_pTetC1.rips is ripsrbsTetRC2_mrnapTetC1; cdsBC3_model_pTetC1.rips is ripsrbsTetRC2_mrnapTetC1;

  // Assignment rules:
  pTetC1pFreeCisEntities := rbsTetRC2/16.60539*(cdsBC3/16.60539);

  // Unit definitions:
  unit nano_mole_per_litre = 1e-9 mole;
  unit volume = 1e-15 litre;
  unit per_second = 1 / second;
end

model pTet_model(SigmaA, ktr, cell, mRNA, pTet, pFreeCisEntities)
  // model units - substance: nano_mole_per_litre, volume: volume

  // Sub-modules:
  pt: promoter_template();

  // Compartments:
  compartment cell = 1e-15 litre; pt.cell is cell;

  // Species:
  species mRNA in cell = 0; pt.mRNA is mRNA;
  species pTet in cell = 1; pt.promoter is pTet;
  species SigmaA in cell = 1000; pt.sigmaFactor is SigmaA;

  // Parameters:
  ktr = 0.05; pt.ktr is ktr;
  pFreeCisEntities = 1; pt.pFreeCisEntities is pFreeCisEntities;

  // Unit definitions:
  unit nano_mole_per_litre = 1e-9 mole;
  unit volume = 1e-15 litre;
  unit per_second = 1 / second;
end

model promoter_template(sigmaFactor, ktr, cell, mRNA, kdeg, promoter, pFreeCisEntities)
  // model units - substance: nano_mole_per_litre, volume: volume

  // Sub-modules:
  transcription: transcription_template();
  mrna_degradation: degradation_template();

  // Compartments:
  compartment cell = 1e-15 litre; transcription.cell is cell; mrna_degradation.cell is cell;

  // Species:
  species promoter in cell = 1.6611; transcription.popsSpecies is promoter;
  species mRNA in cell = 0; transcription.mRNA is mRNA; mrna_degradation.species is mRNA;
  species sigmaFactor in cell = 1000; transcription.sigmaFactor is sigmaFactor;

  // Parameters:
  ktr = 0.1; transcription.ktr is ktr;
  kdeg = 0.0058; mrna_degradation.kdeg is kdeg;
  pFreeCisEntities = 1; transcription.pFreeCisEntities is pFreeCisEntities;

  // Unit definitions:
  unit nano_mole_per_litre = 1e-9 mole;
  unit volume = 1e-15 litre;
  unit per_second = 1 / second;
end

model transcription_template(sigmaFactor, ktr, cell, mRNA, popsSpecies, pFreeCisEntities)
  // model units - substance: nano_mole_per_litre, volume: volume

  // Compartments:
  compartment cell = 1e-15 litre;

  // Species:
  species popsSpecies in cell = 1.6611;
  species mRNA in cell = 0;
  species sigmaFactor in cell = 1000;

  // Parameters:
  kmSF = 50;
  ktr = 0.1;
  pFreeCisEntities = 1;

  // Reactions:
  transcription: popsSpecies => popsSpecies + mRNA; cell*popsSpecies*ktr*(sigmaFactor/(sigmaFactor + kmSF))*pFreeCisEntities;  // modifiers: sigmaFactor

  // Unit definitions:
  unit nano_mole_per_litre = 1e-9 mole;
  unit volume = 1e-15 litre;
  unit per_second = 1 / second;
end

model degradation_template(species, cell, kdeg)
  // model units - substance: nano_mole_per_litre, volume: volume

  // Compartments:
  compartment cell = 1e-15 litre;

  // Species:
  species species in cell = 0;

  // Parameters:
  kdeg = 0.0012;

  // Reactions:
  degradation: species => ; cell*species*kdeg;

  // Unit definitions:
  unit nano_mole_per_litre = 1e-9 mole;
  unit volume = 1e-15 litre;
  unit per_second = 1 / second;
end

model rbsTetR_model(rips, cell, mRNA, ktl, rbs)
  // model units - substance: nano_mole_per_litre, volume: volume

  // Sub-modules:
  rt: rbs_template();

  // Compartments:
  compartment cell = 1e-15 litre; rt.cell is cell;

  // Species:
  species mRNA in cell = 0; rt.mRNA is mRNA;
  species rbs in cell = 1; rt.rbs is rbs;

  // Parameters:
  ktl = 0.0195; rt.ktl is ktl;
  rips = ; rt.rips is rips;

  // Unit definitions:
  unit nano_mole_per_litre = 1e-9 mole;
  unit volume = 1e-15 litre;
  unit per_second = 1 / second;
end

model rbs_template(rips, cell, ktl, mRNA, rbs)
  // model units - substance: nano_mole_per_litre, volume: volume

  // Compartments:
  compartment cell = 1e-15 litre;

  // Species:
  species mRNA in cell = 0;
  species rbs in cell = 1;

  // Parameters:
  ktl = 0.1;

  // Assignment rules:
  rips := ktl*mRNA;

  // Unit definitions:
  unit nano_mole_per_litre = 1e-9 mole;
  unit volume = 1e-15 litre;
  unit per_second = 1 / second;
end

model cdsB_model(protein, rips, cell, cds)
  // model units - substance: nano_mole_per_litre, volume: volume

  // Sub-modules:
  ct: cds_template();

  // Compartments:
  compartment cell = 1e-15 litre; ct.cell is cell;

  // Species:
  species protein in cell = 0; ct.protein is protein;
  species cds in cell = 1;

  // Parameters:
  rips = ; ct.rips is rips;

  // Unit definitions:
  unit nano_mole_per_litre = 1e-9 mole;
  unit volume = 1e-15 litre;
  unit per_second = 1 / second;
end

model cds_template(protein, rips, cell, kdeg)
  // model units - substance: nano_mole_per_litre, volume: volume

  // Sub-modules:
  cdsproduct_degradation: degradation_template();

  // Compartments:
  compartment cell = 1e-15 litre; cdsproduct_degradation.cell is cell;

  // Species:
  species protein in cell = 0; cdsproduct_degradation.species is protein;

  // Parameters:
  rips = ;
  kdeg = 0.0012; cdsproduct_degradation.kdeg is kdeg;

  // Reactions:
  translation: => protein; cell*rips;

  // Unit definitions:
  unit nano_mole_per_litre = 1e-9 mole;
  unit volume = 1e-15 litre;
  unit per_second = 1 / second;
end

model ATC_bindsto_TetR_Dimer_model(kb, complex, cell, kf, reactant, modifier)
  // model units - substance: nano_mole_per_litre, volume: volume

  // Sub-modules:
  binding: bindingwithmodifier_template();

  // Compartments:
  compartment cell = 1e-15 litre; binding.cell is cell;

  // Species:
  species modifier in cell = 1.6611; binding.modifier is modifier;
  species reactant in cell = 0; binding.reactant is reactant;
  species complex in cell = 0; binding.complex is complex;

  // Parameters:
  kf = 0.25; binding.kf is kf;
  kb = 0.27; binding.kb is kb;

  // Unit definitions:
  unit nano_mole_per_litre = 1e-9 mole;
  unit volume = 1e-15 litre;
  unit per_second = 1 / second;
end

model bindingwithmodifier_template(complex, kb, cell, kf, reactant, modifier)
  // model units - substance: nano_mole_per_litre, volume: volume

  // Compartments:
  compartment cell = 1e-15 litre;

  // Species:
  species modifier in cell = 1.6611;
  species reactant in cell = 0;
  species complex in cell = 0;

  // Parameters:
  kf = 0.001;
  kb = 0.5;

  // Reactions:
  binding: reactant => complex; cell*modifier*reactant*kf;  // modifiers: modifier
  unbinding: complex => reactant; cell*complex*kb;

  // Unit definitions:
  unit nano_mole_per_litre = 1e-9 mole;
  unit volume = 1e-15 litre;
  unit per_second = 1 / second;
end

model TetR_Dimer_represses_pTet_model(kb, inhibitor, cell, kf, mRNA, promoter)
  // model units - substance: nano_mole_per_litre, volume: volume

  // Sub-modules:
  prt: promoterrepression_template();

  // Compartments:
  compartment cell = 1e-15 litre; prt.cell is cell;

  // Species:
  species mRNA in cell = 0; prt.mRNA is mRNA;
  species inhibitor in cell = 0; prt.activator is inhibitor;
  species promoter in cell = 0; prt.promoter is promoter;

  // Parameters:
  kf = 0.025; prt.kf is kf;
  kb = 0.2; prt.kb is kb;

  // Unit definitions:
  unit nano_mole_per_litre = 1e-9 mole;
  unit volume = 1e-15 litre;
  unit per_second = 1 / second;
end

model promoterrepression_template(kb, activator, cell, kf, mRNA, promoter)
  // model units - substance: nano_mole_per_litre, volume: volume

  // Sub-modules:
  binding: binding_template();

  // Compartments:
  compartment cell = 1e-15 litre; binding.cell is cell;

  // Species:
  species promoter in cell = 1.6611; binding.species1 is promoter;
  species activator in cell = 0; binding.species2 is activator;
  species promoterRepressor in cell = 0; binding.complex is promoterRepressor;
  species mRNA in cell = 0;

  // Parameters:
  kf = 0.001; binding.kf is kf;
  kb = 0.5; binding.kb is kb;

  // Unit definitions:
  unit nano_mole_per_litre = 1e-9 mole;
  unit volume = 1e-15 litre;
  unit per_second = 1 / second;
end

model binding_template(species1, complex, kb, cell, kf, species2)
  // model units - substance: nano_mole_per_litre, volume: volume

  // Compartments:
  compartment cell = 1e-15 litre;

  // Species:
  species species1 in cell = 1.6611;
  species species2 in cell = 0;
  species complex in cell = 0;

  // Parameters:
  kf = 0.001;
  kb = 0.5;

  // Reactions:
  binding: species1 + species2 => complex; cell*species1*species2*kf;
  unbinding: complex => species1 + species2; cell*complex*kb;

  // Unit definitions:
  unit nano_mole_per_litre = 1e-9 mole;
  unit volume = 1e-15 litre;
  unit per_second = 1 / second;
end

model dimerisation(dimer, kb, cell, kf, species)
  // model units - substance: nano_mole_per_litre, volume: volume

  // Sub-modules:
  dt: dimerisation_template();

  // Compartments:
  compartment cell = 1e-15 litre; dt.cell is cell;

  // Species:
  species species in cell = 0; dt.species1 is species;
  species dimer in cell = 0; dt.complex is dimer;

  // Parameters:
  kf = 0.001; dt.kf is kf;
  kb = 0.2; dt.kb is kb;

  // Unit definitions:
  unit nano_mole_per_litre = 1e-9 mole;
  unit volume = 1e-15 litre;
  unit per_second = 1 / second;
end

model dimerisation_template(complex, kb, cell, kf, species1)
  // model units - substance: nano_mole_per_litre, volume: volume

  // Sub-modules:
  dimer_degradation: degradation_template();

  // Compartments:
  compartment cell = 1e-15 litre; dimer_degradation.cell is cell;

  // Species:
  species species1 in cell = 1.6611;
  species complex in cell = 0; dimer_degradation.species is complex;

  // Parameters:
  kf = 0.0001;
  kb = 0.5;

  // Reactions:
  binding: 2 species1 => complex; cell*species1*species1*kf;
  unbinding: complex => 2 species1; cell*complex*kb;

  // Unit definitions:
  unit nano_mole_per_litre = 1e-9 mole;
  unit volume = 1e-15 litre;
  unit per_second = 1 / second;
end

model A_bindsto_B_model(species1, kb, complex, cell, kf, species2)
  // model units - substance: nano_mole_per_litre, volume: volume

  // Sub-modules:
  binding: binding_template();

  // Compartments:
  compartment cell = 1e-15 litre; binding.cell is cell;

  // Species:
  species species1 in cell = 1.6611; binding.species1 is species1;
  species species2 in cell = 0; binding.species2 is species2;
  species complex in cell = 0; binding.complex is complex;

  // Parameters:
  kf = 0.1; binding.kf is kf;
  kb = 0.5; binding.kb is kb;

  // Unit definitions:
  unit nano_mole_per_litre = 1e-9 mole;
  unit volume = 1e-15 litre;
  unit per_second = 1 / second;
end

model IPTG_bindsto_LacI_Tetramer_model(kb, complex, cell, kf, reactant, modifier)
  // model units - substance: nano_mole_per_litre, volume: volume

  // Sub-modules:
  binding: bindingwithmodifier_template();

  // Compartments:
  compartment cell = 1e-15 litre; binding.cell is cell;

  // Species:
  species modifier in cell = 1.6611; binding.modifier is modifier;
  species reactant in cell = 0; binding.reactant is reactant;
  species complex in cell = 0; binding.complex is complex;

  // Parameters:
  kf = 0.2; binding.kf is kf;
  kb = 0.27; binding.kb is kb;

  // Unit definitions:
  unit nano_mole_per_litre = 1e-9 mole;
  unit volume = 1e-15 litre;
  unit per_second = 1 / second;
end

model Sensor_circuit_model(SigmaA, TetR_ATC, ATC, TetR_Dimer, TetR, B, LacI_Dimer, LacI, A, AB, LacI_Tetramer, LacI_IPTG, IPTG, cell)
  // model units - substance: nano_mole_per_litre, volume: volume

  // Sub-modules:
  pConstLacIC1_model: pConstLacI_model();
  rbs1C2_model_pConstLacIC1: rbs1_model();
  cdsLacIC3_model_pConstLacIC1: cdsLacI_model();
  pConstTetRC5_model: pConstTetR_model();
  rbs2C6_model_pConstTetRC5: rbs2_model();
  cdsTetRC7_model_pConstTetRC5: cdsTetR_model();

  // Compartments:
  compartment cell = 1e-15 litre; pConstLacIC1_model.cell is cell; rbs1C2_model_pConstLacIC1.cell is cell; cdsLacIC3_model_pConstLacIC1.cell is cell; pConstTetRC5_model.cell is cell; rbs2C6_model_pConstTetRC5.cell is cell; cdsTetRC7_model_pConstTetRC5.cell is cell;

  // Species:
  species SigmaA in cell = 1000; pConstLacIC1_model.SigmaA is SigmaA; pConstTetRC5_model.SigmaA is SigmaA;
  species mrnapConstLacIC1 in cell = 0; pConstLacIC1_model.mRNA is mrnapConstLacIC1; rbs1C2_model_pConstLacIC1.mRNA is mrnapConstLacIC1;
  species pConstLacIC1 in cell = 16.60539; pConstLacIC1_model.pConstLacI is pConstLacIC1;
  species rbs1C2 in cell = 16.60539; rbs1C2_model_pConstLacIC1.rbs is rbs1C2;
  species cdsLacIC3 in cell = 16.60539; cdsLacIC3_model_pConstLacIC1.cds is cdsLacIC3;
  species mrnapConstTetRC5 in cell = 0; pConstTetRC5_model.mRNA is mrnapConstTetRC5; rbs2C6_model_pConstTetRC5.mRNA is mrnapConstTetRC5;
  species pConstTetRC5 in cell = 16.60539; pConstTetRC5_model.pConstTetR is pConstTetRC5;
  species rbs2C6 in cell = 16.60539; rbs2C6_model_pConstTetRC5.rbs is rbs2C6;
  species cdsTetRC7 in cell = 16.60539; cdsTetRC7_model_pConstTetRC5.cds is cdsTetRC7;
  species TetR_ATC in cell = 0;
  species ATC in cell = 0;
  species TetR_Dimer in cell = 0;
  species TetR in cell = 0; cdsTetRC7_model_pConstTetRC5.protein is TetR;
  species B in cell = 0;
  species LacI_Dimer in cell = 0;
  species LacI in cell = 0; cdsLacIC3_model_pConstLacIC1.protein is LacI;
  species A in cell = 0;
  species AB in cell = 0;
  species LacI_Tetramer in cell = 0;
  species LacI_IPTG in cell = 0;
  species IPTG in cell = 0;

  // Parameters:
  ripsrbs1C2_mrnapConstLacIC1 = ; rbs1C2_model_pConstLacIC1.rips is ripsrbs1C2_mrnapConstLacIC1; cdsLacIC3_model_pConstLacIC1.rips is ripsrbs1C2_mrnapConstLacIC1;
  ripsrbs2C6_mrnapConstTetRC5 = ; rbs2C6_model_pConstTetRC5.rips is ripsrbs2C6_mrnapConstTetRC5; cdsTetRC7_model_pConstTetRC5.rips is ripsrbs2C6_mrnapConstTetRC5;

  // Assignment rules:
  pConstLacIC1pFreeCisEntities := rbs1C2/16.60539*(cdsLacIC3/16.60539);
  pConstTetRC5pFreeCisEntities := rbs2C6/16.60539*(cdsTetRC7/16.60539);

  // Unit definitions:
  unit nano_mole_per_litre = 1e-9 mole;
  unit volume = 1e-15 litre;
  unit per_second = 1 / second;
end

model pConstLacI_model(SigmaA, ktr, cell, mRNA, pConstLacI, pFreeCisEntities)
  // model units - substance: nano_mole_per_litre, volume: volume

  // Sub-modules:
  pt: promoter_template();

  // Compartments:
  compartment cell = 1e-15 litre; pt.cell is cell;

  // Species:
  species mRNA in cell = 0; pt.mRNA is mRNA;
  species pConstLacI in cell = 1; pt.promoter is pConstLacI;
  species SigmaA in cell = 1000; pt.sigmaFactor is SigmaA;

  // Parameters:
  ktr = 0.1; pt.ktr is ktr;
  pFreeCisEntities = 1; pt.pFreeCisEntities is pFreeCisEntities;

  // Unit definitions:
  unit nano_mole_per_litre = 1e-9 mole;
  unit volume = 1e-15 litre;
  unit per_second = 1 / second;
end

model rbs1_model(rips, cell, mRNA, ktl, rbs)
  // model units - substance: nano_mole_per_litre, volume: volume

  // Sub-modules:
  rt: rbs_template();

  // Compartments:
  compartment cell = 1e-15 litre; rt.cell is cell;

  // Species:
  species mRNA in cell = 0; rt.mRNA is mRNA;
  species rbs in cell = 1; rt.rbs is rbs;

  // Parameters:
  ktl = 0.01; rt.ktl is ktl;
  rips = ; rt.rips is rips;

  // Unit definitions:
  unit nano_mole_per_litre = 1e-9 mole;
  unit volume = 1e-15 litre;
  unit per_second = 1 / second;
end

model cdsLacI_model(protein, rips, cell, cds)
  // model units - substance: nano_mole_per_litre, volume: volume

  // Sub-modules:
  ct: cds_template();

  // Compartments:
  compartment cell = 1e-15 litre; ct.cell is cell;

  // Species:
  species protein in cell = 0; ct.protein is protein;
  species cds in cell = 1;

  // Parameters:
  rips = ; ct.rips is rips;

  // Unit definitions:
  unit nano_mole_per_litre = 1e-9 mole;
  unit volume = 1e-15 litre;
  unit per_second = 1 / second;
end

model pConstTetR_model(SigmaA, ktr, cell, mRNA, pConstTetR, pFreeCisEntities)
  // model units - substance: nano_mole_per_litre, volume: volume

  // Sub-modules:
  pt: promoter_template();

  // Compartments:
  compartment cell = 1e-15 litre; pt.cell is cell;

  // Species:
  species mRNA in cell = 0; pt.mRNA is mRNA;
  species pConstTetR in cell = 1; pt.promoter is pConstTetR;
  species SigmaA in cell = 1000; pt.sigmaFactor is SigmaA;

  // Parameters:
  ktr = 0.1; pt.ktr is ktr;
  pFreeCisEntities = 1; pt.pFreeCisEntities is pFreeCisEntities;

  // Unit definitions:
  unit nano_mole_per_litre = 1e-9 mole;
  unit volume = 1e-15 litre;
  unit per_second = 1 / second;
end

model rbs2_model(rips, cell, mRNA, ktl, rbs)
  // model units - substance: nano_mole_per_litre, volume: volume

  // Sub-modules:
  rt: rbs_template();

  // Compartments:
  compartment cell = 1e-15 litre; rt.cell is cell;

  // Species:
  species mRNA in cell = 0; rt.mRNA is mRNA;
  species rbs in cell = 1; rt.rbs is rbs;

  // Parameters:
  ktl = 0.01; rt.ktl is ktl;
  rips = ; rt.rips is rips;

  // Unit definitions:
  unit nano_mole_per_litre = 1e-9 mole;
  unit volume = 1e-15 litre;
  unit per_second = 1 / second;
end

model cdsTetR_model(protein, rips, cell, cds)
  // model units - substance: nano_mole_per_litre, volume: volume

  // Sub-modules:
  ct: cds_template();

  // Compartments:
  compartment cell = 1e-15 litre; ct.cell is cell;

  // Species:
  species protein in cell = 0; ct.protein is protein;
  species cds in cell = 1;

  // Parameters:
  rips = ; ct.rips is rips;

  // Unit definitions:
  unit nano_mole_per_litre = 1e-9 mole;
  unit volume = 1e-15 litre;
  unit per_second = 1 / second;
end

model A_circuit_model(SigmaA, TetR_ATC, ATC, TetR_Dimer, TetR, LacI_Tetramer, B, LacI_Dimer, LacI, A, AB, LacI_IPTG, IPTG, cell)
  // model units - substance: nano_mole_per_litre, volume: volume

  // Sub-modules:
  pLacIC1_model: pLacI_model();
  rbsLacIC2_model_pLacIC1: rbsLacI_model();
  cdsAC3_model_pLacIC1: cdsA_model();
  LacI_Tetramer_represses_pLacI_pLacIC1_model: LacI_Tetramer_represses_pLacI_model();

  // Compartments:
  compartment cell = 1e-15 litre; pLacIC1_model.cell is cell; rbsLacIC2_model_pLacIC1.cell is cell; cdsAC3_model_pLacIC1.cell is cell; LacI_Tetramer_represses_pLacI_pLacIC1_model.cell is cell;

  // Species:
  species SigmaA in cell = 1000; pLacIC1_model.SigmaA is SigmaA;
  species mrnapLacIC1 in cell = 0; pLacIC1_model.mRNA is mrnapLacIC1; rbsLacIC2_model_pLacIC1.mRNA is mrnapLacIC1; LacI_Tetramer_represses_pLacI_pLacIC1_model.mRNA is mrnapLacIC1;
  species pLacIC1 in cell = 16.60539; pLacIC1_model.pLacI is pLacIC1; LacI_Tetramer_represses_pLacI_pLacIC1_model.promoter is pLacIC1;
  species rbsLacIC2 in cell = 16.60539; rbsLacIC2_model_pLacIC1.rbs is rbsLacIC2;
  species cdsAC3 in cell = 16.60539; cdsAC3_model_pLacIC1.cds is cdsAC3;
  species TetR_ATC in cell = 0;
  species ATC in cell = 0;
  species TetR_Dimer in cell = 0;
  species TetR in cell = 0;
  species LacI_Tetramer in cell = 0; LacI_Tetramer_represses_pLacI_pLacIC1_model.inhibitor is LacI_Tetramer;
  species B in cell = 0;
  species LacI_Dimer in cell = 0;
  species LacI in cell = 0;
  species A in cell = 0; cdsAC3_model_pLacIC1.protein is A;
  species AB in cell = 0;
  species LacI_IPTG in cell = 0;
  species IPTG in cell = 0;

  // Parameters:
  ripsrbsLacIC2_mrnapLacIC1 = ; rbsLacIC2_model_pLacIC1.rips is ripsrbsLacIC2_mrnapLacIC1; cdsAC3_model_pLacIC1.rips is ripsrbsLacIC2_mrnapLacIC1;

  // Assignment rules:
  pLacIC1pFreeCisEntities := rbsLacIC2/16.60539*(cdsAC3/16.60539);

  // Unit definitions:
  unit nano_mole_per_litre = 1e-9 mole;
  unit volume = 1e-15 litre;
  unit per_second = 1 / second;
end

model pLacI_model(SigmaA, ktr, cell, mRNA, pLacI, pFreeCisEntities)
  // model units - substance: nano_mole_per_litre, volume: volume

  // Sub-modules:
  pt: promoter_template();

  // Compartments:
  compartment cell = 1e-15 litre; pt.cell is cell;

  // Species:
  species mRNA in cell = 0; pt.mRNA is mRNA;
  species pLacI in cell = 1; pt.promoter is pLacI;
  species SigmaA in cell = 1000; pt.sigmaFactor is SigmaA;

  // Parameters:
  ktr = 0.03; pt.ktr is ktr;
  pFreeCisEntities = 1; pt.pFreeCisEntities is pFreeCisEntities;

  // Unit definitions:
  unit nano_mole_per_litre = 1e-9 mole;
  unit volume = 1e-15 litre;
  unit per_second = 1 / second;
end

model rbsLacI_model(rips, cell, mRNA, ktl, rbs)
  // model units - substance: nano_mole_per_litre, volume: volume

  // Sub-modules:
  rt: rbs_template();

  // Compartments:
  compartment cell = 1e-15 litre; rt.cell is cell;

  // Species:
  species mRNA in cell = 0; rt.mRNA is mRNA;
  species rbs in cell = 1; rt.rbs is rbs;

  // Parameters:
  ktl = 0.015; rt.ktl is ktl;
  rips = ; rt.rips is rips;

  // Unit definitions:
  unit nano_mole_per_litre = 1e-9 mole;
  unit volume = 1e-15 litre;
  unit per_second = 1 / second;
end

model cdsA_model(protein, rips, cell, cds)
  // model units - substance: nano_mole_per_litre, volume: volume

  // Sub-modules:
  ct: cds_template();

  // Compartments:
  compartment cell = 1e-15 litre; ct.cell is cell;

  // Species:
  species protein in cell = 0; ct.protein is protein;
  species cds in cell = 1;

  // Parameters:
  rips = ; ct.rips is rips;

  // Unit definitions:
  unit nano_mole_per_litre = 1e-9 mole;
  unit volume = 1e-15 litre;
  unit per_second = 1 / second;
end

model LacI_Tetramer_represses_pLacI_model(kb, inhibitor, cell, kf, mRNA, promoter)
  // model units - substance: nano_mole_per_litre, volume: volume

  // Sub-modules:
  prt: promoterrepression_template();

  // Compartments:
  compartment cell = 1e-15 litre; prt.cell is cell;

  // Species:
  species mRNA in cell = 0; prt.mRNA is mRNA;
  species inhibitor in cell = 0; prt.activator is inhibitor;
  species promoter in cell = 0; prt.promoter is promoter;

  // Parameters:
  kf = 0.06; prt.kf is kf;
  kb = 0.2; prt.kb is kb;

  // Unit definitions:
  unit nano_mole_per_litre = 1e-9 mole;
  unit volume = 1e-15 litre;
  unit per_second = 1 / second;
end

model main()
  // model units - substance: nano_mole_per_litre, volume: volume

  // Sub-modules:
  B_circuit_model: B_circuit_model();
  Sensor_circuit_model: Sensor_circuit_model();
  A_circuit_model: A_circuit_model();

  // Compartments:
  compartment cell = 1e-15 litre; B_circuit_model.cell is cell; Sensor_circuit_model.cell is cell; A_circuit_model.cell is cell;

  // Species:
  species SigmaA in cell = 1000; B_circuit_model.SigmaA is SigmaA; Sensor_circuit_model.SigmaA is SigmaA; A_circuit_model.SigmaA is SigmaA;
  species TetR_ATC in cell = 0; B_circuit_model.TetR_ATC is TetR_ATC; Sensor_circuit_model.TetR_ATC is TetR_ATC; A_circuit_model.TetR_ATC is TetR_ATC;
  species ATC in cell = 0; B_circuit_model.ATC is ATC; Sensor_circuit_model.ATC is ATC; A_circuit_model.ATC is ATC;
  species TetR_Dimer in cell = 0; B_circuit_model.TetR_Dimer is TetR_Dimer; Sensor_circuit_model.TetR_Dimer is TetR_Dimer; A_circuit_model.TetR_Dimer is TetR_Dimer;
  species TetR in cell = 0; B_circuit_model.TetR is TetR; Sensor_circuit_model.TetR is TetR; A_circuit_model.TetR is TetR;
  species B in cell = 0; B_circuit_model.B is B; Sensor_circuit_model.B is B; A_circuit_model.B is B;
  species LacI_Dimer in cell = 0; B_circuit_model.LacI_Dimer is LacI_Dimer; Sensor_circuit_model.LacI_Dimer is LacI_Dimer; A_circuit_model.LacI_Dimer is LacI_Dimer;
  species LacI in cell = 0; B_circuit_model.LacI is LacI; Sensor_circuit_model.LacI is LacI; A_circuit_model.LacI is LacI;
  species A in cell = 0; B_circuit_model.A is A; Sensor_circuit_model.A is A; A_circuit_model.A is A;
  species AB in cell = 0; B_circuit_model.AB is AB; Sensor_circuit_model.AB is AB; A_circuit_model.AB is AB;
  species LacI_Tetramer in cell = 0; B_circuit_model.LacI_Tetramer is LacI_Tetramer; Sensor_circuit_model.LacI_Tetramer is LacI_Tetramer; A_circuit_model.LacI_Tetramer is LacI_Tetramer;
  species LacI_IPTG in cell = 0; B_circuit_model.LacI_IPTG is LacI_IPTG; Sensor_circuit_model.LacI_IPTG is LacI_IPTG; A_circuit_model.LacI_IPTG is LacI_IPTG;
  species IPTG in cell = 0; B_circuit_model.IPTG is IPTG; Sensor_circuit_model.IPTG is IPTG; A_circuit_model.IPTG is IPTG;

  // Assignment rules:
  Atotal_param := A + AB;
  Btotal_param := B + AB;

  // Events:
  IPTG_setEvent_0: at (time == 0), persistent=false: IPTG = 0;
  IPTG_unsetEvent_0: at (time == 40), persistent=false: IPTG = 0;
  IPTG_setEvent_1: at (time == 40), persistent=false: IPTG = 0;
  IPTG_unsetEvent_1: at (time == 80), persistent=false: IPTG = 0;
  IPTG_setEvent_2: at (time == 80), persistent=false: IPTG = 0;
  IPTG_unsetEvent_2: at (time == 120), persistent=false: IPTG = 0;
  IPTG_setEvent_3: at (time == 120), persistent=false: IPTG = 0;
  IPTG_unsetEvent_3: at (time == 160), persistent=false: IPTG = 0;
  IPTG_setEvent_4: at (time == 160), persistent=false: IPTG = 0;
  IPTG_unsetEvent_4: at (time == 200), persistent=false: IPTG = 0;
  IPTG_setEvent_5: at (time == 200), persistent=false: IPTG = 0;
  IPTG_unsetEvent_5: at (time == 240), persistent=false: IPTG = 0;
  IPTG_setEvent_6: at (time == 240), persistent=false: IPTG = 0;
  IPTG_unsetEvent_6: at (time == 280), persistent=false: IPTG = 0;
  IPTG_setEvent_7: at (time == 280), persistent=false: IPTG = 0;
  IPTG_unsetEvent_7: at (time == 320), persistent=false: IPTG = 0;
  IPTG_setEvent_8: at (time == 320), persistent=false: IPTG = 0;
  IPTG_unsetEvent_8: at (time == 361), persistent=false: IPTG = 0;
  IPTG_setEvent_9: at (time == 361), persistent=false: IPTG = 0;
  IPTG_unsetEvent_9: at (time == 401), persistent=false: IPTG = 0;
  IPTG_setEvent_10: at (time == 401), persistent=false: IPTG = 0;
  IPTG_unsetEvent_10: at (time == 441), persistent=false: IPTG = 0;
  IPTG_setEvent_11: at (time == 441), persistent=false: IPTG = 0;
  IPTG_unsetEvent_11: at (time == 481), persistent=false: IPTG = 0;
  IPTG_setEvent_12: at (time == 481), persistent=false: IPTG = 0;
  IPTG_unsetEvent_12: at (time == 521), persistent=false: IPTG = 0;
  IPTG_setEvent_13: at (time == 521), persistent=false: IPTG = 0;
  IPTG_unsetEvent_13: at (time == 561), persistent=false: IPTG = 0;
  IPTG_setEvent_14: at (time == 561), persistent=false: IPTG = 0;
  IPTG_unsetEvent_14: at (time == 601), persistent=false: IPTG = 0;
  IPTG_setEvent_15: at (time == 601), persistent=false: IPTG = 0;
  IPTG_unsetEvent_15: at (time == 641), persistent=false: IPTG = 0;
  IPTG_setEvent_16: at (time == 641), persistent=false: IPTG = 0;
  IPTG_unsetEvent_16: at (time == 682), persistent=false: IPTG = 0;
  IPTG_setEvent_17: at (time == 682), persistent=false: IPTG = 0;
  IPTG_unsetEvent_17: at (time == 722), persistent=false: IPTG = 0;
  IPTG_setEvent_18: at (time == 722), persistent=false: IPTG = 0;
  IPTG_unsetEvent_18: at (time == 762), persistent=false: IPTG = 0;
  IPTG_setEvent_19: at (time == 762), persistent=false: IPTG = 0;
  IPTG_unsetEvent_19: at (time == 802), persistent=false: IPTG = 0;
  IPTG_setEvent_20: at (time == 802), persistent=false: IPTG = 0;
  IPTG_unsetEvent_20: at (time == 842), persistent=false: IPTG = 0;
  IPTG_setEvent_21: at (time == 842), persistent=false: IPTG = 141;
  IPTG_unsetEvent_21: at (time == 882), persistent=false: IPTG = 0;
  IPTG_setEvent_22: at (time == 882), persistent=false: IPTG = 359;
  IPTG_unsetEvent_22: at (time == 922), persistent=false: IPTG = 0;
  IPTG_setEvent_23: at (time == 922), persistent=false: IPTG = 494;
  IPTG_unsetEvent_23: at (time == 962), persistent=false: IPTG = 0;
  IPTG_setEvent_24: at (time == 962), persistent=false: IPTG = 550;
  IPTG_unsetEvent_24: at (time == 1003), persistent=false: IPTG = 0;
  IPTG_setEvent_25: at (time == 1003), persistent=false: IPTG = 351;
  IPTG_unsetEvent_25: at (time == 1043), persistent=false: IPTG = 0;
  IPTG_setEvent_26: at (time == 1043), persistent=false: IPTG = 187;
  IPTG_unsetEvent_26: at (time == 1083), persistent=false: IPTG = 0;
  IPTG_setEvent_27: at (time == 1083), persistent=false: IPTG = 123;
  IPTG_unsetEvent_27: at (time == 1123), persistent=false: IPTG = 0;
  IPTG_setEvent_28: at (time == 1123), persistent=false: IPTG = 90;
  IPTG_unsetEvent_28: at (time == 1163), persistent=false: IPTG = 0;
  IPTG_setEvent_29: at (time == 1163), persistent=false: IPTG = 69;
  IPTG_unsetEvent_29: at (time == 1203), persistent=false: IPTG = 0;
  IPTG_setEvent_30: at (time == 1203), persistent=false: IPTG = 56;
  IPTG_unsetEvent_30: at (time == 1243), persistent=false: IPTG = 0;
  IPTG_setEvent_31: at (time == 1243), persistent=false: IPTG = 46;
  IPTG_unsetEvent_31: at (time == 1283), persistent=false: IPTG = 0;
  IPTG_setEvent_32: at (time == 1283), persistent=false: IPTG = 39;
  IPTG_unsetEvent_32: at (time == 1324), persistent=false: IPTG = 0;
  IPTG_setEvent_33: at (time == 1324), persistent=false: IPTG = 33;
  IPTG_unsetEvent_33: at (time == 1364), persistent=false: IPTG = 0;
  IPTG_setEvent_34: at (time == 1364), persistent=false: IPTG = 29;
  IPTG_unsetEvent_34: at (time == 1404), persistent=false: IPTG = 0;
  IPTG_setEvent_35: at (time == 1404), persistent=false: IPTG = 26;
  IPTG_unsetEvent_35: at (time == 1444), persistent=false: IPTG = 0;
  IPTG_setEvent_36: at (time == 1444), persistent=false: IPTG = 23;
  IPTG_unsetEvent_36: at (time == 1484), persistent=false: IPTG = 0;
  IPTG_setEvent_37: at (time == 1484), persistent=false: IPTG = 20;
  IPTG_unsetEvent_37: at (time == 1524), persistent=false: IPTG = 0;
  IPTG_setEvent_38: at (time == 1524), persistent=false: IPTG = 18;
  IPTG_unsetEvent_38: at (time == 1564), persistent=false: IPTG = 0;
  IPTG_setEvent_39: at (time == 1564), persistent=false: IPTG = 17;
  IPTG_unsetEvent_39: at (time == 1604), persistent=false: IPTG = 0;
  IPTG_setEvent_40: at (time == 1604), persistent=false: IPTG = 15;
  IPTG_unsetEvent_40: at (time == 1645), persistent=false: IPTG = 0;
  IPTG_setEvent_41: at (time == 1645), persistent=false: IPTG = 14;
  IPTG_unsetEvent_41: at (time == 1685), persistent=false: IPTG = 0;
  IPTG_setEvent_42: at (time == 1685), persistent=false: IPTG = 16;
  IPTG_unsetEvent_42: at (time == 1725), persistent=false: IPTG = 0;
  IPTG_setEvent_43: at (time == 1725), persistent=false: IPTG = 339;
  IPTG_unsetEvent_43: at (time == 1765), persistent=false: IPTG = 0;
  IPTG_setEvent_44: at (time == 1765), persistent=false: IPTG = 461;
  IPTG_unsetEvent_44: at (time == 1805), persistent=false: IPTG = 0;
  IPTG_setEvent_45: at (time == 1805), persistent=false: IPTG = 499;
  IPTG_unsetEvent_45: at (time == 1845), persistent=false: IPTG = 0;
  IPTG_setEvent_46: at (time == 1845), persistent=false: IPTG = 514;
  IPTG_unsetEvent_46: at (time == 1885), persistent=false: IPTG = 0;
  IPTG_setEvent_47: at (time == 1885), persistent=false: IPTG = 248;
  IPTG_unsetEvent_47: at (time == 1925), persistent=false: IPTG = 0;
  IPTG_setEvent_48: at (time == 1925), persistent=false: IPTG = 155;
  IPTG_unsetEvent_48: at (time == 1965), persistent=false: IPTG = 0;
  IPTG_setEvent_49: at (time == 1965), persistent=false: IPTG = 111;
  IPTG_unsetEvent_49: at (time == 2006), persistent=false: IPTG = 0;
  IPTG_setEvent_50: at (time == 2006), persistent=false: IPTG = 85;
  IPTG_unsetEvent_50: at (time == 2046), persistent=false: IPTG = 0;
  IPTG_setEvent_51: at (time == 2046), persistent=false: IPTG = 69;
  IPTG_unsetEvent_51: at (time == 2086), persistent=false: IPTG = 0;
  IPTG_setEvent_52: at (time == 2086), persistent=false: IPTG = 57;
  IPTG_unsetEvent_52: at (time == 2126), persistent=false: IPTG = 0;
  IPTG_setEvent_53: at (time == 2126), persistent=false: IPTG = 137;
  IPTG_unsetEvent_53: at (time == 2166), persistent=false: IPTG = 0;
  IPTG_setEvent_54: at (time == 2166), persistent=false: IPTG = 399;
  IPTG_unsetEvent_54: at (time == 2206), persistent=false: IPTG = 0;
  IPTG_setEvent_55: at (time == 2206), persistent=false: IPTG = 480;
  IPTG_unsetEvent_55: at (time == 2246), persistent=false: IPTG = 0;
  IPTG_setEvent_56: at (time == 2246), persistent=false: IPTG = 590;
  IPTG_unsetEvent_56: at (time == 2286), persistent=false: IPTG = 0;
  IPTG_setEvent_57: at (time == 2286), persistent=false: IPTG = 438;
  IPTG_unsetEvent_57: at (time == 2327), persistent=false: IPTG = 0;
  IPTG_setEvent_58: at (time == 2327), persistent=false: IPTG = 232;
  IPTG_unsetEvent_58: at (time == 2367), persistent=false: IPTG = 0;
  IPTG_setEvent_59: at (time == 2367), persistent=false: IPTG = 156;
  IPTG_unsetEvent_59: at (time == 2407), persistent=false: IPTG = 0;
  IPTG_setEvent_60: at (time == 2407), persistent=false: IPTG = 117;
  IPTG_unsetEvent_60: at (time == 2447), persistent=false: IPTG = 0;
  IPTG_setEvent_61: at (time == 2447), persistent=false: IPTG = 93;
  IPTG_unsetEvent_61: at (time == 2487), persistent=false: IPTG = 0;
  IPTG_setEvent_62: at (time == 2487), persistent=false: IPTG = 77;
  IPTG_unsetEvent_62: at (time == 2527), persistent=false: IPTG = 0;
  IPTG_setEvent_63: at (time == 2527), persistent=false: IPTG = 66;
  IPTG_unsetEvent_63: at (time == 2567), persistent=false: IPTG = 0;
  IPTG_setEvent_64: at (time == 2567), persistent=false: IPTG = 225;
  IPTG_unsetEvent_64: at (time == 2607), persistent=false: IPTG = 0;
  IPTG_setEvent_65: at (time == 2607), persistent=false: IPTG = 423;
  IPTG_unsetEvent_65: at (time == 2648), persistent=false: IPTG = 0;
  IPTG_setEvent_66: at (time == 2648), persistent=false: IPTG = 561;
  IPTG_unsetEvent_66: at (time == 2688), persistent=false: IPTG = 0;
  IPTG_setEvent_67: at (time == 2688), persistent=false: IPTG = 580;
  IPTG_unsetEvent_67: at (time == 2728), persistent=false: IPTG = 0;
  IPTG_setEvent_68: at (time == 2728), persistent=false: IPTG = 362;
  IPTG_unsetEvent_68: at (time == 2768), persistent=false: IPTG = 0;
  IPTG_setEvent_69: at (time == 2768), persistent=false: IPTG = 212;
  IPTG_unsetEvent_69: at (time == 2808), persistent=false: IPTG = 0;
  IPTG_setEvent_70: at (time == 2808), persistent=false: IPTG = 150;
  IPTG_unsetEvent_70: at (time == 2848), persistent=false: IPTG = 0;
  IPTG_setEvent_71: at (time == 2848), persistent=false: IPTG = 116;
  IPTG_unsetEvent_71: at (time == 2888), persistent=false: IPTG = 0;
  IPTG_setEvent_72: at (time == 2888), persistent=false: IPTG = 95;
  IPTG_unsetEvent_72: at (time == 2928), persistent=false: IPTG = 0;
  IPTG_setEvent_73: at (time == 2928), persistent=false: IPTG = 80;
  IPTG_unsetEvent_73: at (time == 2969), persistent=false: IPTG = 0;
  IPTG_setEvent_74: at (time == 2969), persistent=false: IPTG = 69;
  IPTG_unsetEvent_74: at (time == 3009), persistent=false: IPTG = 0;
  IPTG_setEvent_75: at (time == 3009), persistent=false: IPTG = 302;
  IPTG_unsetEvent_75: at (time == 3049), persistent=false: IPTG = 0;
  IPTG_setEvent_76: at (time == 3049), persistent=false: IPTG = 509;
  IPTG_unsetEvent_76: at (time == 3089), persistent=false: IPTG = 0;
  IPTG_setEvent_77: at (time == 3089), persistent=false: IPTG = 548;
  IPTG_unsetEvent_77: at (time == 3129), persistent=false: IPTG = 0;
  IPTG_setEvent_78: at (time == 3129), persistent=false: IPTG = 560;
  IPTG_unsetEvent_78: at (time == 3169), persistent=false: IPTG = 0;
  IPTG_setEvent_79: at (time == 3169), persistent=false: IPTG = 308;
  IPTG_unsetEvent_79: at (time == 3209), persistent=false: IPTG = 0;
  IPTG_setEvent_80: at (time == 3209), persistent=false: IPTG = 195;
  IPTG_unsetEvent_80: at (time == 3249), persistent=false: IPTG = 0;
  IPTG_setEvent_81: at (time == 3249), persistent=false: IPTG = 143;
  IPTG_unsetEvent_81: at (time == 3290), persistent=false: IPTG = 0;
  IPTG_setEvent_82: at (time == 3290), persistent=false: IPTG = 114;
  IPTG_unsetEvent_82: at (time == 3330), persistent=false: IPTG = 0;
  IPTG_setEvent_83: at (time == 3330), persistent=false: IPTG = 94;
  IPTG_unsetEvent_83: at (time == 3370), persistent=false: IPTG = 0;
  IPTG_setEvent_84: at (time == 3370), persistent=false: IPTG = 80;
  IPTG_unsetEvent_84: at (time == 3410), persistent=false: IPTG = 0;
  IPTG_setEvent_85: at (time == 3410), persistent=false: IPTG = 70;
  IPTG_unsetEvent_85: at (time == 3450), persistent=false: IPTG = 0;
  IPTG_setEvent_86: at (time == 3450), persistent=false: IPTG = 62;
  IPTG_unsetEvent_86: at (time == 3490), persistent=false: IPTG = 0;
  IPTG_setEvent_87: at (time == 3490), persistent=false: IPTG = 56;
  IPTG_unsetEvent_87: at (time == 3530), persistent=false: IPTG = 0;
  IPTG_setEvent_88: at (time == 3530), persistent=false: IPTG = 51;
  IPTG_unsetEvent_88: at (time == 3570), persistent=false: IPTG = 0;
  IPTG_setEvent_89: at (time == 3570), persistent=false: IPTG = 46;
  IPTG_unsetEvent_89: at (time == 3611), persistent=false: IPTG = 0;
  IPTG_setEvent_90: at (time == 3611), persistent=false: IPTG = 43;
  IPTG_unsetEvent_90: at (time == 3651), persistent=false: IPTG = 0;
  IPTG_setEvent_91: at (time == 3651), persistent=false: IPTG = 40;
  IPTG_unsetEvent_91: at (time == 3691), persistent=false: IPTG = 0;
  IPTG_setEvent_92: at (time == 3691), persistent=false: IPTG = 37;
  IPTG_unsetEvent_92: at (time == 3731), persistent=false: IPTG = 0;
  IPTG_setEvent_93: at (time == 3731), persistent=false: IPTG = 35;
  IPTG_unsetEvent_93: at (time == 3771), persistent=false: IPTG = 0;
  IPTG_setEvent_94: at (time == 3771), persistent=false: IPTG = 32;
  IPTG_unsetEvent_94: at (time == 3811), persistent=false: IPTG = 0;
  IPTG_setEvent_95: at (time == 3811), persistent=false: IPTG = 31;
  IPTG_unsetEvent_95: at (time == 3851), persistent=false: IPTG = 0;
  IPTG_setEvent_96: at (time == 3851), persistent=false: IPTG = 29;
  IPTG_unsetEvent_96: at (time == 3891), persistent=false: IPTG = 0;
  IPTG_setEvent_97: at (time == 3891), persistent=false: IPTG = 27;
  IPTG_unsetEvent_97: at (time == 3931), persistent=false: IPTG = 0;
  IPTG_setEvent_98: at (time == 3931), persistent=false: IPTG = 26;
  IPTG_unsetEvent_98: at (time == 3972), persistent=false: IPTG = 0;
  IPTG_setEvent_99: at (time == 3972), persistent=false: IPTG = 25;
  IPTG_unsetEvent_99: at (time == 4012), persistent=false: IPTG = 0;
  IPTG_setEvent_100: at (time == 4012), persistent=false: IPTG = 24;
  IPTG_unsetEvent_100: at (time == 4052), persistent=false: IPTG = 0;
  IPTG_setEvent_101: at (time == 4052), persistent=false: IPTG = 23;
  IPTG_unsetEvent_101: at (time == 4092), persistent=false: IPTG = 0;
  IPTG_setEvent_102: at (time == 4092), persistent=false: IPTG = 22;
  IPTG_unsetEvent_102: at (time == 4132), persistent=false: IPTG = 0;
  IPTG_setEvent_103: at (time == 4132), persistent=false: IPTG = 21;
  IPTG_unsetEvent_103: at (time == 4172), persistent=false: IPTG = 0;
  IPTG_setEvent_104: at (time == 4172), persistent=false: IPTG = 20;
  IPTG_unsetEvent_104: at (time == 4212), persistent=false: IPTG = 0;
  IPTG_setEvent_105: at (time == 4212), persistent=false: IPTG = 19;
  IPTG_unsetEvent_105: at (time == 4252), persistent=false: IPTG = 0;
  IPTG_setEvent_106: at (time == 4252), persistent=false: IPTG = 18;
  IPTG_unsetEvent_106: at (time == 4293), persistent=false: IPTG = 0;
  IPTG_setEvent_107: at (time == 4293), persistent=false: IPTG = 207;
  IPTG_unsetEvent_107: at (time == 4333), persistent=false: IPTG = 0;
  IPTG_setEvent_108: at (time == 4333), persistent=false: IPTG = 425;
  IPTG_unsetEvent_108: at (time == 4373), persistent=false: IPTG = 0;
  IPTG_setEvent_109: at (time == 4373), persistent=false: IPTG = 531;
  IPTG_unsetEvent_109: at (time == 4413), persistent=false: IPTG = 0;
  IPTG_setEvent_110: at (time == 4413), persistent=false: IPTG = 545;
  IPTG_unsetEvent_110: at (time == 4453), persistent=false: IPTG = 0;
  IPTG_setEvent_111: at (time == 4453), persistent=false: IPTG = 317;
  IPTG_unsetEvent_111: at (time == 4493), persistent=false: IPTG = 0;
  IPTG_setEvent_112: at (time == 4493), persistent=false: IPTG = 185;
  IPTG_unsetEvent_112: at (time == 4533), persistent=false: IPTG = 0;
  IPTG_setEvent_113: at (time == 4533), persistent=false: IPTG = 130;
  IPTG_unsetEvent_113: at (time == 4573), persistent=false: IPTG = 0;
  IPTG_setEvent_114: at (time == 4573), persistent=false: IPTG = 99;
  IPTG_unsetEvent_114: at (time == 4614), persistent=false: IPTG = 0;
  IPTG_setEvent_115: at (time == 4614), persistent=false: IPTG = 80;
  IPTG_unsetEvent_115: at (time == 4654), persistent=false: IPTG = 0;
  IPTG_setEvent_116: at (time == 4654), persistent=false: IPTG = 67;
  IPTG_unsetEvent_116: at (time == 4694), persistent=false: IPTG = 0;
  IPTG_setEvent_117: at (time == 4694), persistent=false: IPTG = 58;
  IPTG_unsetEvent_117: at (time == 4734), persistent=false: IPTG = 0;
  IPTG_setEvent_118: at (time == 4734), persistent=false: IPTG = 50;
  IPTG_unsetEvent_118: at (time == 4774), persistent=false: IPTG = 0;
  IPTG_setEvent_119: at (time == 4774), persistent=false: IPTG = 45;
  IPTG_unsetEvent_119: at (time == 4814), persistent=false: IPTG = 0;
  IPTG_setEvent_120: at (time == 4814), persistent=false: IPTG = 40;
  IPTG_unsetEvent_120: at (time == 4854), persistent=false: IPTG = 0;
  IPTG_setEvent_121: at (time == 4854), persistent=false: IPTG = 37;
  IPTG_unsetEvent_121: at (time == 4894), persistent=false: IPTG = 0;
  IPTG_setEvent_122: at (time == 4894), persistent=false: IPTG = 34;
  IPTG_unsetEvent_122: at (time == 4935), persistent=false: IPTG = 0;
  IPTG_setEvent_123: at (time == 4935), persistent=false: IPTG = 31;
  IPTG_unsetEvent_123: at (time == 4975), persistent=false: IPTG = 0;
  IPTG_setEvent_124: at (time == 4975), persistent=false: IPTG = 29;
  IPTG_unsetEvent_124: at (time == 5015), persistent=false: IPTG = 0;
  IPTG_setEvent_125: at (time == 5015), persistent=false: IPTG = 27;
  IPTG_unsetEvent_125: at (time == 5055), persistent=false: IPTG = 0;
  IPTG_setEvent_126: at (time == 5055), persistent=false: IPTG = 26;
  IPTG_unsetEvent_126: at (time == 5095), persistent=false: IPTG = 0;
  IPTG_setEvent_127: at (time == 5095), persistent=false: IPTG = 24;
  IPTG_unsetEvent_127: at (time == 5135), persistent=false: IPTG = 0;
  IPTG_setEvent_128: at (time == 5135), persistent=false: IPTG = 85;
  IPTG_unsetEvent_128: at (time == 5175), persistent=false: IPTG = 0;
  IPTG_setEvent_129: at (time == 5175), persistent=false: IPTG = 376;
  IPTG_unsetEvent_129: at (time == 5215), persistent=false: IPTG = 0;
  IPTG_setEvent_130: at (time == 5215), persistent=false: IPTG = 460;
  IPTG_unsetEvent_130: at (time == 5256), persistent=false: IPTG = 0;
  IPTG_setEvent_131: at (time == 5256), persistent=false: IPTG = 559;
  IPTG_unsetEvent_131: at (time == 5296), persistent=false: IPTG = 0;
  IPTG_setEvent_132: at (time == 5296), persistent=false: IPTG = 456;
  IPTG_unsetEvent_132: at (time == 5336), persistent=false: IPTG = 0;
  IPTG_setEvent_133: at (time == 5336), persistent=false: IPTG = 231;
  IPTG_unsetEvent_133: at (time == 5376), persistent=false: IPTG = 0;
  IPTG_setEvent_134: at (time == 5376), persistent=false: IPTG = 153;
  IPTG_unsetEvent_134: at (time == 5416), persistent=false: IPTG = 0;
  IPTG_setEvent_135: at (time == 5416), persistent=false: IPTG = 113;
  IPTG_unsetEvent_135: at (time == 5456), persistent=false: IPTG = 0;
  IPTG_setEvent_136: at (time == 5456), persistent=false: IPTG = 90;
  IPTG_unsetEvent_136: at (time == 5496), persistent=false: IPTG = 0;
  IPTG_setEvent_137: at (time == 5496), persistent=false: IPTG = 74;
  IPTG_unsetEvent_137: at (time == 5536), persistent=false: IPTG = 0;
  IPTG_setEvent_138: at (time == 5536), persistent=false: IPTG = 63;
  IPTG_unsetEvent_138: at (time == 5577), persistent=false: IPTG = 0;
  ATC_setevent_0: at (time == 100), persistent=false: ATC = 0;
  ATC_unsetevent_0: at (time == 140), persistent=false: ATC = 0;
  ATC_setevent_1: at (time == 140), persistent=false: ATC = 0;
  ATC_unsetevent_1: at (time == 180), persistent=false: ATC = 0;
  ATC_setevent_2: at (time == 180), persistent=false: ATC = 0;
  ATC_unsetevent_2: at (time == 220), persistent=false: ATC = 0;
  ATC_setevent_3: at (time == 220), persistent=false: ATC = 0;
  ATC_unsetevent_3: at (time == 260), persistent=false: ATC = 0;
  ATC_setevent_4: at (time == 260), persistent=false: ATC = 0;
  ATC_unsetevent_4: at (time == 300), persistent=false: ATC = 0;
  ATC_setevent_5: at (time == 300), persistent=false: ATC = 0;
  ATC_unsetevent_5: at (time == 340), persistent=false: ATC = 0;
  ATC_setevent_6: at (time == 340), persistent=false: ATC = 0;
  ATC_unsetevent_6: at (time == 380), persistent=false: ATC = 0;
  ATC_setevent_7: at (time == 380), persistent=false: ATC = 0;
  ATC_unsetevent_7: at (time == 420), persistent=false: ATC = 0;
  ATC_setevent_8: at (time == 420), persistent=false: ATC = 0;
  ATC_unsetevent_8: at (time == 461), persistent=false: ATC = 0;
  ATC_setevent_9: at (time == 461), persistent=false: ATC = 0;
  ATC_unsetevent_9: at (time == 501), persistent=false: ATC = 0;
  ATC_setevent_10: at (time == 501), persistent=false: ATC = 0;
  ATC_unsetevent_10: at (time == 541), persistent=false: ATC = 0;
  ATC_setevent_11: at (time == 541), persistent=false: ATC = 0;
  ATC_unsetevent_11: at (time == 581), persistent=false: ATC = 0;
  ATC_setevent_12: at (time == 581), persistent=false: ATC = 0;
  ATC_unsetevent_12: at (time == 621), persistent=false: ATC = 0;
  ATC_setevent_13: at (time == 621), persistent=false: ATC = 0;
  ATC_unsetevent_13: at (time == 661), persistent=false: ATC = 0;
  ATC_setevent_14: at (time == 661), persistent=false: ATC = 0;
  ATC_unsetevent_14: at (time == 701), persistent=false: ATC = 0;
  ATC_setevent_15: at (time == 701), persistent=false: ATC = 0;
  ATC_unsetevent_15: at (time == 741), persistent=false: ATC = 0;
  ATC_setevent_16: at (time == 741), persistent=false: ATC = 0;
  ATC_unsetevent_16: at (time == 782), persistent=false: ATC = 0;
  ATC_setevent_17: at (time == 782), persistent=false: ATC = 0;
  ATC_unsetevent_17: at (time == 822), persistent=false: ATC = 0;
  ATC_setevent_18: at (time == 822), persistent=false: ATC = 0;
  ATC_unsetevent_18: at (time == 862), persistent=false: ATC = 0;
  ATC_setevent_19: at (time == 862), persistent=false: ATC = 0;
  ATC_unsetevent_19: at (time == 902), persistent=false: ATC = 0;
  ATC_setevent_20: at (time == 902), persistent=false: ATC = 0;
  ATC_unsetevent_20: at (time == 942), persistent=false: ATC = 0;
  ATC_setevent_21: at (time == 942), persistent=false: ATC = 66;
  ATC_unsetevent_21: at (time == 982), persistent=false: ATC = 0;
  ATC_setevent_22: at (time == 982), persistent=false: ATC = 137;
  ATC_unsetevent_22: at (time == 1022), persistent=false: ATC = 0;
  ATC_setevent_23: at (time == 1022), persistent=false: ATC = 193;
  ATC_unsetevent_23: at (time == 1062), persistent=false: ATC = 0;
  ATC_setevent_24: at (time == 1062), persistent=false: ATC = 198;
  ATC_unsetevent_24: at (time == 1103), persistent=false: ATC = 0;
  ATC_setevent_25: at (time == 1103), persistent=false: ATC = 107;
  ATC_unsetevent_25: at (time == 1143), persistent=false: ATC = 0;
  ATC_setevent_26: at (time == 1143), persistent=false: ATC = 54;
  ATC_unsetevent_26: at (time == 1183), persistent=false: ATC = 0;
  ATC_setevent_27: at (time == 1183), persistent=false: ATC = 35;
  ATC_unsetevent_27: at (time == 1223), persistent=false: ATC = 0;
  ATC_setevent_28: at (time == 1223), persistent=false: ATC = 25;
  ATC_unsetevent_28: at (time == 1263), persistent=false: ATC = 0;
  ATC_setevent_29: at (time == 1263), persistent=false: ATC = 19;
  ATC_unsetevent_29: at (time == 1303), persistent=false: ATC = 0;
  ATC_setevent_30: at (time == 1303), persistent=false: ATC = 15;
  ATC_unsetevent_30: at (time == 1343), persistent=false: ATC = 0;
  ATC_setevent_31: at (time == 1343), persistent=false: ATC = 13;
  ATC_unsetevent_31: at (time == 1383), persistent=false: ATC = 0;
  ATC_setevent_32: at (time == 1383), persistent=false: ATC = 11;
  ATC_unsetevent_32: at (time == 1424), persistent=false: ATC = 0;
  ATC_setevent_33: at (time == 1424), persistent=false: ATC = 9;
  ATC_unsetevent_33: at (time == 1464), persistent=false: ATC = 0;
  ATC_setevent_34: at (time == 1464), persistent=false: ATC = 8;
  ATC_unsetevent_34: at (time == 1504), persistent=false: ATC = 0;
  ATC_setevent_35: at (time == 1504), persistent=false: ATC = 7;
  ATC_unsetevent_35: at (time == 1544), persistent=false: ATC = 0;
  ATC_setevent_36: at (time == 1544), persistent=false: ATC = 6;
  ATC_unsetevent_36: at (time == 1584), persistent=false: ATC = 0;
  ATC_setevent_37: at (time == 1584), persistent=false: ATC = 5;
  ATC_unsetevent_37: at (time == 1624), persistent=false: ATC = 0;
  ATC_setevent_38: at (time == 1624), persistent=false: ATC = 5;
  ATC_unsetevent_38: at (time == 1664), persistent=false: ATC = 0;
  ATC_setevent_39: at (time == 1664), persistent=false: ATC = 4;
  ATC_unsetevent_39: at (time == 1704), persistent=false: ATC = 0;
  ATC_setevent_40: at (time == 1704), persistent=false: ATC = 4;
  ATC_unsetevent_40: at (time == 1745), persistent=false: ATC = 0;
  ATC_setevent_41: at (time == 1745), persistent=false: ATC = 4;
  ATC_unsetevent_41: at (time == 1785), persistent=false: ATC = 0;
  ATC_setevent_42: at (time == 1785), persistent=false: ATC = 7;
  ATC_unsetevent_42: at (time == 1825), persistent=false: ATC = 0;
  ATC_setevent_43: at (time == 1825), persistent=false: ATC = 144;
  ATC_unsetevent_43: at (time == 1865), persistent=false: ATC = 0;
  ATC_setevent_44: at (time == 1865), persistent=false: ATC = 170;
  ATC_unsetevent_44: at (time == 1905), persistent=false: ATC = 0;
  ATC_setevent_45: at (time == 1905), persistent=false: ATC = 180;
  ATC_unsetevent_45: at (time == 1945), persistent=false: ATC = 0;
  ATC_setevent_46: at (time == 1945), persistent=false: ATC = 177;
  ATC_unsetevent_46: at (time == 1985), persistent=false: ATC = 0;
  ATC_setevent_47: at (time == 1985), persistent=false: ATC = 73;
  ATC_unsetevent_47: at (time == 2025), persistent=false: ATC = 0;
  ATC_setevent_48: at (time == 2025), persistent=false: ATC = 44;
  ATC_unsetevent_48: at (time == 2065), persistent=false: ATC = 0;
  ATC_setevent_49: at (time == 2065), persistent=false: ATC = 31;
  ATC_unsetevent_49: at (time == 2106), persistent=false: ATC = 0;
  ATC_setevent_50: at (time == 2106), persistent=false: ATC = 24;
  ATC_unsetevent_50: at (time == 2146), persistent=false: ATC = 0;
  ATC_setevent_51: at (time == 2146), persistent=false: ATC = 19;
  ATC_unsetevent_51: at (time == 2186), persistent=false: ATC = 0;
  ATC_setevent_52: at (time == 2186), persistent=false: ATC = 16;
  ATC_unsetevent_52: at (time == 2226), persistent=false: ATC = 0;
  ATC_setevent_53: at (time == 2226), persistent=false: ATC = 60;
  ATC_unsetevent_53: at (time == 2266), persistent=false: ATC = 0;
  ATC_setevent_54: at (time == 2266), persistent=false: ATC = 150;
  ATC_unsetevent_54: at (time == 2306), persistent=false: ATC = 0;
  ATC_setevent_55: at (time == 2306), persistent=false: ATC = 177;
  ATC_unsetevent_55: at (time == 2346), persistent=false: ATC = 0;
  ATC_setevent_56: at (time == 2346), persistent=false: ATC = 218;
  ATC_unsetevent_56: at (time == 2386), persistent=false: ATC = 0;
  ATC_setevent_57: at (time == 2386), persistent=false: ATC = 136;
  ATC_unsetevent_57: at (time == 2427), persistent=false: ATC = 0;
  ATC_setevent_58: at (time == 2427), persistent=false: ATC = 67;
  ATC_unsetevent_58: at (time == 2467), persistent=false: ATC = 0;
  ATC_setevent_59: at (time == 2467), persistent=false: ATC = 44;
  ATC_unsetevent_59: at (time == 2507), persistent=false: ATC = 0;
  ATC_setevent_60: at (time == 2507), persistent=false: ATC = 33;
  ATC_unsetevent_60: at (time == 2547), persistent=false: ATC = 0;
  ATC_setevent_61: at (time == 2547), persistent=false: ATC = 26;
  ATC_unsetevent_61: at (time == 2587), persistent=false: ATC = 0;
  ATC_setevent_62: at (time == 2587), persistent=false: ATC = 21;
  ATC_unsetevent_62: at (time == 2627), persistent=false: ATC = 0;
  ATC_setevent_63: at (time == 2627), persistent=false: ATC = 18;
  ATC_unsetevent_63: at (time == 2667), persistent=false: ATC = 0;
  ATC_setevent_64: at (time == 2667), persistent=false: ATC = 91;
  ATC_unsetevent_64: at (time == 2707), persistent=false: ATC = 0;
  ATC_setevent_65: at (time == 2707), persistent=false: ATC = 162;
  ATC_unsetevent_65: at (time == 2748), persistent=false: ATC = 0;
  ATC_setevent_66: at (time == 2748), persistent=false: ATC = 208;
  ATC_unsetevent_66: at (time == 2788), persistent=false: ATC = 0;
  ATC_setevent_67: at (time == 2788), persistent=false: ATC = 203;
  ATC_unsetevent_67: at (time == 2828), persistent=false: ATC = 0;
  ATC_setevent_68: at (time == 2828), persistent=false: ATC = 108;
  ATC_unsetevent_68: at (time == 2868), persistent=false: ATC = 0;
  ATC_setevent_69: at (time == 2868), persistent=false: ATC = 61;
  ATC_unsetevent_69: at (time == 2908), persistent=false: ATC = 0;
  ATC_setevent_70: at (time == 2908), persistent=false: ATC = 42;
  ATC_unsetevent_70: at (time == 2948), persistent=false: ATC = 0;
  ATC_setevent_71: at (time == 2948), persistent=false: ATC = 33;
  ATC_unsetevent_71: at (time == 2988), persistent=false: ATC = 0;
  ATC_setevent_72: at (time == 2988), persistent=false: ATC = 26;
  ATC_unsetevent_72: at (time == 3028), persistent=false: ATC = 0;
  ATC_setevent_73: at (time == 3028), persistent=false: ATC = 22;
  ATC_unsetevent_73: at (time == 3069), persistent=false: ATC = 0;
  ATC_setevent_74: at (time == 3069), persistent=false: ATC = 19;
  ATC_unsetevent_74: at (time == 3109), persistent=false: ATC = 0;
  ATC_setevent_75: at (time == 3109), persistent=false: ATC = 125;
  ATC_unsetevent_75: at (time == 3149), persistent=false: ATC = 0;
  ATC_setevent_76: at (time == 3149), persistent=false: ATC = 191;
  ATC_unsetevent_76: at (time == 3189), persistent=false: ATC = 0;
  ATC_setevent_77: at (time == 3189), persistent=false: ATC = 194;
  ATC_unsetevent_77: at (time == 3229), persistent=false: ATC = 0;
  ATC_setevent_78: at (time == 3229), persistent=false: ATC = 194;
  ATC_unsetevent_78: at (time == 3269), persistent=false: ATC = 0;
  ATC_setevent_79: at (time == 3269), persistent=false: ATC = 90;
  ATC_unsetevent_79: at (time == 3309), persistent=false: ATC = 0;
  ATC_setevent_80: at (time == 3309), persistent=false: ATC = 56;
  ATC_unsetevent_80: at (time == 3349), persistent=false: ATC = 0;
  ATC_setevent_81: at (time == 3349), persistent=false: ATC = 40;
  ATC_unsetevent_81: at (time == 3390), persistent=false: ATC = 0;
  ATC_setevent_82: at (time == 3390), persistent=false: ATC = 32;
  ATC_unsetevent_82: at (time == 3430), persistent=false: ATC = 0;
  ATC_setevent_83: at (time == 3430), persistent=false: ATC = 26;
  ATC_unsetevent_83: at (time == 3470), persistent=false: ATC = 0;
  ATC_setevent_84: at (time == 3470), persistent=false: ATC = 22;
  ATC_unsetevent_84: at (time == 3510), persistent=false: ATC = 0;
  ATC_setevent_85: at (time == 3510), persistent=false: ATC = 19;
  ATC_unsetevent_85: at (time == 3550), persistent=false: ATC = 0;
  ATC_setevent_86: at (time == 3550), persistent=false: ATC = 17;
  ATC_unsetevent_86: at (time == 3590), persistent=false: ATC = 0;
  ATC_setevent_87: at (time == 3590), persistent=false: ATC = 15;
  ATC_unsetevent_87: at (time == 3630), persistent=false: ATC = 0;
  ATC_setevent_88: at (time == 3630), persistent=false: ATC = 14;
  ATC_unsetevent_88: at (time == 3670), persistent=false: ATC = 0;
  ATC_setevent_89: at (time == 3670), persistent=false: ATC = 13;
  ATC_unsetevent_89: at (time == 3711), persistent=false: ATC = 0;
  ATC_setevent_90: at (time == 3711), persistent=false: ATC = 12;
  ATC_unsetevent_90: at (time == 3751), persistent=false: ATC = 0;
  ATC_setevent_91: at (time == 3751), persistent=false: ATC = 11;
  ATC_unsetevent_91: at (time == 3791), persistent=false: ATC = 0;
  ATC_setevent_92: at (time == 3791), persistent=false: ATC = 10;
  ATC_unsetevent_92: at (time == 3831), persistent=false: ATC = 0;
  ATC_setevent_93: at (time == 3831), persistent=false: ATC = 9;
  ATC_unsetevent_93: at (time == 3871), persistent=false: ATC = 0;
  ATC_setevent_94: at (time == 3871), persistent=false: ATC = 9;
  ATC_unsetevent_94: at (time == 3911), persistent=false: ATC = 0;
  ATC_setevent_95: at (time == 3911), persistent=false: ATC = 8;
  ATC_unsetevent_95: at (time == 3951), persistent=false: ATC = 0;
  ATC_setevent_96: at (time == 3951), persistent=false: ATC = 8;
  ATC_unsetevent_96: at (time == 3991), persistent=false: ATC = 0;
  ATC_setevent_97: at (time == 3991), persistent=false: ATC = 7;
  ATC_unsetevent_97: at (time == 4031), persistent=false: ATC = 0;
  ATC_setevent_98: at (time == 4031), persistent=false: ATC = 7;
  ATC_unsetevent_98: at (time == 4072), persistent=false: ATC = 0;
  ATC_setevent_99: at (time == 4072), persistent=false: ATC = 7;
  ATC_unsetevent_99: at (time == 4112), persistent=false: ATC = 0;
  ATC_setevent_100: at (time == 4112), persistent=false: ATC = 6;
  ATC_unsetevent_100: at (time == 4152), persistent=false: ATC = 0;
  ATC_setevent_101: at (time == 4152), persistent=false: ATC = 6;
  ATC_unsetevent_101: at (time == 4192), persistent=false: ATC = 0;
  ATC_setevent_102: at (time == 4192), persistent=false: ATC = 6;
  ATC_unsetevent_102: at (time == 4232), persistent=false: ATC = 0;
  ATC_setevent_103: at (time == 4232), persistent=false: ATC = 5;
  ATC_unsetevent_103: at (time == 4272), persistent=false: ATC = 0;
  ATC_setevent_104: at (time == 4272), persistent=false: ATC = 5;
  ATC_unsetevent_104: at (time == 4312), persistent=false: ATC = 0;
  ATC_setevent_105: at (time == 4312), persistent=false: ATC = 5;
  ATC_unsetevent_105: at (time == 4352), persistent=false: ATC = 0;
  ATC_setevent_106: at (time == 4352), persistent=false: ATC = 5;
  ATC_unsetevent_106: at (time == 4393), persistent=false: ATC = 0;
  ATC_setevent_107: at (time == 4393), persistent=false: ATC = 87;
  ATC_unsetevent_107: at (time == 4433), persistent=false: ATC = 0;
  ATC_setevent_108: at (time == 4433), persistent=false: ATC = 170;
  ATC_unsetevent_108: at (time == 4473), persistent=false: ATC = 0;
  ATC_setevent_109: at (time == 4473), persistent=false: ATC = 194;
  ATC_unsetevent_109: at (time == 4513), persistent=false: ATC = 0;
  ATC_setevent_110: at (time == 4513), persistent=false: ATC = 192;
  ATC_unsetevent_110: at (time == 4553), persistent=false: ATC = 0;
  ATC_setevent_111: at (time == 4553), persistent=false: ATC = 94;
  ATC_unsetevent_111: at (time == 4593), persistent=false: ATC = 0;
  ATC_setevent_112: at (time == 4593), persistent=false: ATC = 53;
  ATC_unsetevent_112: at (time == 4633), persistent=false: ATC = 0;
  ATC_setevent_113: at (time == 4633), persistent=false: ATC = 37;
  ATC_unsetevent_113: at (time == 4673), persistent=false: ATC = 0;
  ATC_setevent_114: at (time == 4673), persistent=false: ATC = 28;
  ATC_unsetevent_114: at (time == 4714), persistent=false: ATC = 0;
  ATC_setevent_115: at (time == 4714), persistent=false: ATC = 22;
  ATC_unsetevent_115: at (time == 4754), persistent=false: ATC = 0;
  ATC_setevent_116: at (time == 4754), persistent=false: ATC = 18;
  ATC_unsetevent_116: at (time == 4794), persistent=false: ATC = 0;
  ATC_setevent_117: at (time == 4794), persistent=false: ATC = 16;
  ATC_unsetevent_117: at (time == 4834), persistent=false: ATC = 0;
  ATC_setevent_118: at (time == 4834), persistent=false: ATC = 14;
  ATC_unsetevent_118: at (time == 4874), persistent=false: ATC = 0;
  ATC_setevent_119: at (time == 4874), persistent=false: ATC = 12;
  ATC_unsetevent_119: at (time == 4914), persistent=false: ATC = 0;
  ATC_setevent_120: at (time == 4914), persistent=false: ATC = 11;
  ATC_unsetevent_120: at (time == 4954), persistent=false: ATC = 0;
  ATC_setevent_121: at (time == 4954), persistent=false: ATC = 10;
  ATC_unsetevent_121: at (time == 4994), persistent=false: ATC = 0;
  ATC_setevent_122: at (time == 4994), persistent=false: ATC = 9;
  ATC_unsetevent_122: at (time == 5035), persistent=false: ATC = 0;
  ATC_setevent_123: at (time == 5035), persistent=false: ATC = 8;
  ATC_unsetevent_123: at (time == 5075), persistent=false: ATC = 0;
  ATC_setevent_124: at (time == 5075), persistent=false: ATC = 8;
  ATC_unsetevent_124: at (time == 5115), persistent=false: ATC = 0;
  ATC_setevent_125: at (time == 5115), persistent=false: ATC = 7;
  ATC_unsetevent_125: at (time == 5155), persistent=false: ATC = 0;
  ATC_setevent_126: at (time == 5155), persistent=false: ATC = 7;
  ATC_unsetevent_126: at (time == 5195), persistent=false: ATC = 0;
  ATC_setevent_127: at (time == 5195), persistent=false: ATC = 6;
  ATC_unsetevent_127: at (time == 5235), persistent=false: ATC = 0;
  ATC_setevent_128: at (time == 5235), persistent=false: ATC = 42;
  ATC_unsetevent_128: at (time == 5275), persistent=false: ATC = 0;
  ATC_setevent_129: at (time == 5275), persistent=false: ATC = 146;
  ATC_unsetevent_129: at (time == 5315), persistent=false: ATC = 0;
  ATC_setevent_130: at (time == 5315), persistent=false: ATC = 167;
  ATC_unsetevent_130: at (time == 5356), persistent=false: ATC = 0;
  ATC_setevent_131: at (time == 5356), persistent=false: ATC = 211;
  ATC_unsetevent_131: at (time == 5396), persistent=false: ATC = 0;
  ATC_setevent_132: at (time == 5396), persistent=false: ATC = 145;
  ATC_unsetevent_132: at (time == 5436), persistent=false: ATC = 0;
  ATC_setevent_133: at (time == 5436), persistent=false: ATC = 67;
  ATC_unsetevent_133: at (time == 5476), persistent=false: ATC = 0;
  ATC_setevent_134: at (time == 5476), persistent=false: ATC = 43;
  ATC_unsetevent_134: at (time == 5516), persistent=false: ATC = 0;
  ATC_setevent_135: at (time == 5516), persistent=false: ATC = 32;
  ATC_unsetevent_135: at (time == 5556), persistent=false: ATC = 0;
  ATC_setevent_136: at (time == 5556), persistent=false: ATC = 25;
  ATC_unsetevent_136: at (time == 5596), persistent=false: ATC = 0;
  ATC_setevent_137: at (time == 5596), persistent=false: ATC = 21;
  ATC_unsetevent_137: at (time == 5636), persistent=false: ATC = 0;
  ATC_setevent_138: at (time == 5636), persistent=false: ATC = 17;
  ATC_unsetevent_138: at (time == 5677), persistent=false: ATC = 0;

  // Unit definitions:
  unit nano_mole_per_litre = 1e-9 mole;
  unit volume = 1e-15 litre;
  unit per_second = 1 / second;
end
